# metaD with plumed and in-line python

variable        TEMP equal V_TEMP
variable        PACE equal V_PACE
variable        HILL_HEIGHT string V_HILL_HEIGHT
variable        HILL_SIGMA  string V_HILL_SIGMA
variable        EXPECT_NUMB_REACT_INSTANCE equal V_EXPECT_NUMB_REACT_INSTANCE
#variable       LOOP equal ceil(4.6*0.8/${HILL_HEIGHT}*${EXPECT_NUMB_REACT_INSTANCE})+2 # self-adaptively controlling the length of the simulation, by approximately evaluating how many hills (in ideal) will be needed to break a C-C single bond around 80 kcal/mol = 4.6*0.8 eV, will be added by func add_command_lmpptr
variable        HARMONIC_THICKNESS equal V_HARMONIC_THICKNESS
variable        HARMONIC_FACTOR equal V_HARMONIC_FACTOR
variable        TIME_STEP equal V_TIME_STEP
variable        THERMO_FREQ     equal V_OUTFREQ_PLUMED
variable        MASS_HYDROGEN equal V_MASS_HYDROGEN
variable        LOCAL_RCUT equal V_LOCAL_RCUT
variable        SECURE_SINGLE_ATOM_RCUT equal V_SECURE_SINGLE_ATOM_RCUT
variable        Nrepeats string V_Nrepeats
variable        DROP_HYDROGEN_RCUT_LARGERTHAN equal V_DROP_HYDROGEN_RCUT_LARGERTHAN
variable        NUM_LOCAL_DIVISIONS python distinguish_local_global


units           metal
boundary        f f f
atom_style      atomic

neighbor        2.0 bin
neigh_modify    every 10 delay 0 check no

read_data conf.lmp

mass             1 ${MASS_HYDROGEN} # mass of H revise to heavier values
mass             2 12
mass             3 14
mass             4 15
mass             5 19
mass             6 31
mass             7 32
mass             8 35

pair_style      deepmd model.000.pth model.001.pth model.002.pth model.003.pth out_freq ${THERMO_FREQ} out_file model_devi.out
pair_coeff  * *

#define the nanoreactor
variable        sphere_r equal 0.5*lx
region          reactor sphere v_sphere_r v_sphere_r v_sphere_r v_sphere_r side in units box
fix             reactor_wall all wall/region reactor harmonic ${HARMONIC_FACTOR} 0.0 ${HARMONIC_THICKNESS}
#end of nanoreactor

velocity        all create ${TEMP} 240411

fix             1 all nvt temp ${TEMP} ${TEMP} 0.1
#fix            2 all ave/atom 1 ${Nrepeats} ${PACE} x y z  # for time-averaged reference, will be set by func add_commnad_lmptr
fix             momenta all momentum 100 angular rescale

timestep        ${TIME_STEP}
thermo_style    custom step pe ke etotal temp press vol
thermo          ${THERMO_FREQ}

restart         10000 dpgen.restart

############################################################################################################
##python block, please see https://docs.lammps.org/python.html
############################################################################################################

############################################################################################################
##source code here ~~~~~~~~~~~~~~~~~~~~~~~~~~~~~~~~~~~~~~~~~~~~~~~~~~~~~~~~~~~~~~~~~~~~~~~~~~~~~~~~~~~~~~~~~

python source here """ #this line is the lammps key for heading python source codes
from ase import Atoms
from ase.io import read, write
from ase.dimer import DimerControl, MinModeAtoms, MinModeTranslate
import os
import glob
import numpy as np
import MDAnalysis as mda
from  MDAnalysis import Universe
from MDAnalysis.analysis import align
from MDAnalysis.analysis import distances
import json
import dpdata
import time
import random
import MDAnalysis as mda
import math

import pandas as pd
from scipy.signal import argrelextrema, savgol_filter

import re
from collections import defaultdict

# Global DeepMD model cache to avoid reloading models
# This prevents the "operator already registered" error
_DEEPMD_MODEL_CACHE = {}

def get_deepmd_model(model_file, use_server=True, num_servers=4, server_client_dir="/opt", base_port=50001):
    # Get or create a DeepMD model instance using multi-server
    # This ensures each model file is loaded only once per server
    # Note: the current LAMMPS dimer workflow always requests use_server=True.
    # use_server=False is retained only as a legacy helper path, not as an exposed workflow option.
    global _DEEPMD_MODEL_CACHE
    import os
    import sys

    server_client_dir = os.path.abspath(os.path.expanduser(server_client_dir))
    cache_key = f"{model_file}_{use_server}_{num_servers}_{server_client_dir}_{base_port}"

    # Return cached client if available
    if cache_key in _DEEPMD_MODEL_CACHE:
        print(f"Using cached DeepMD model: {cache_key}")
        return _DEEPMD_MODEL_CACHE[cache_key]

    # Try multi-server mode first if requested
    if use_server:
        try:
            # Import multi-server client
            if server_client_dir not in sys.path:
                sys.path.insert(0, server_client_dir)
            from deepmd_client import create_multi_server_client

            print(f"Creating multi-server DeepMD client with {num_servers} servers from {server_client_dir}")
            client = create_multi_server_client(num_servers=num_servers, base_port=base_port)

            # Cache the client
            _DEEPMD_MODEL_CACHE[cache_key] = client
            return client

        except Exception as e:
            print(f"Failed to create multi-server client: {e}")
            print("Server-client mode requested; direct model fallback is disabled.")
            raise

    # Legacy direct loading path (not used by the current LAMMPS dimer workflow)
    # Check if this is model.000.pth which LAMMPS already loaded
    # If so, create a copy to avoid PyTorch operator re-registration
    if model_file == "model.000.pth":
        # Create a unique copy for Python/ASE use
        import shutil
        copy_name = "model.000_dimer.pth"

        if not os.path.exists(copy_name):
            shutil.copy2(model_file, copy_name)
            print(f"Created model copy: {copy_name} to avoid conflicts with LAMMPS")

        model_file = copy_name

    if model_file not in _DEEPMD_MODEL_CACHE:
        try:
            from deepmd.calculator import DP
            _DEEPMD_MODEL_CACHE[model_file] = DP(model=model_file)
            print(f"Loaded DeepMD model: {model_file}")
        except Exception as e:
            print(f"Error loading DeepMD model {model_file}: {e}")
            raise

    return _DEEPMD_MODEL_CACHE[model_file]

# Load the coordinates using dpdata
def load_coordinates(file_path):
        system = dpdata.System(file_path)
        return system["coords"][0]

# Calculate the geometric center of the molecule
def calculate_center(coordinates, indices):
        selected_coords = coordinates[indices]
        return np.mean(selected_coords, axis=0)

# Calculate the distance between two points
def distance(point1, point2):
        return np.linalg.norm(point1 - point2)

# Create a division based on the cutoff radius
def create_division(coordinates, reference_index, rcut, assigned_indices):
        division = []
        for i, coord in enumerate(coordinates):
                if i not in assigned_indices and distance(coordinates[reference_index], coord) <= rcut:
                        division.append(i)
                        assigned_indices.add(i)
        return division

# Merge single-atom divisions into the nearest division
def merge_single_atom_divisions(divisions, coordinates, secure_distance):
        for i, division in enumerate(divisions):
                if len(division) == 1:
                        single_atom_index = division[0]
                        min_distance = float('inf')
                        nearest_division_index = -1
                        for j, other_division in enumerate(divisions):
                                if i != j:
                                        for atom_index in other_division:
                                                dist = distance(coordinates[single_atom_index], coordinates[atom_index])
                                                if dist < min_distance and dist <= secure_distance:
                                                        min_distance = dist
                                                        nearest_division_index = j
                        if nearest_division_index != -1:
                                divisions[nearest_division_index].append(single_atom_index)
                                divisions[i] = []
        return [division for division in divisions if division]


def make_division_plus_one_dropHydrogen (file_path,divisions,type_map=["H","C","N","O","F","P","S","Cl"]):
        system=dpdata.System(file_path,type_map=type_map)
        print(divisions)
        ele_idx=system["atom_types"]
        ele_names=np.array(type_map)[ele_idx]

        divisions_plus_one = [[x + 1 for x in sublist if ele_names[x] != "H" ] for sublist in divisions]
        divisions_plus_one = [division for division in divisions_plus_one if len(division) > 0 ]

        return divisions_plus_one


# Main function to divide the molecule
def make_local_division(file_path, rcut, secure_distance=1.9, drop_hydrogen_rcut_largerthan=1.3, type_map="H,C,N,O,F,P,S,Cl"):
        coordinates = load_coordinates(file_path)
        #print(coordinates)
        total_indices = set(range(len(coordinates)))
        assigned_indices = set()
        divisions = []

        # Start with a random atom for the first division
        first_reference_index = random.choice(list(total_indices))
        division = create_division(coordinates, first_reference_index, rcut, assigned_indices)
        divisions.append(division)

        while assigned_indices != total_indices:
                remaining_indices = list(total_indices - assigned_indices)
                if len(remaining_indices) == 1:
                        # Merge the last remaining atom with the nearest division
                        single_atom_index = remaining_indices[0]
                        min_distance = float('inf')
                        nearest_division_index = -1
                        for i, division in enumerate(divisions):
                                for atom_index in division:
                                        dist = distance(coordinates[single_atom_index], coordinates[atom_index])
                                        if dist < min_distance and dist <= secure_distance:
                                                min_distance = dist
                                                nearest_division_index = i
                        if nearest_division_index != -1:
                                divisions[nearest_division_index].append(single_atom_index)
                                assigned_indices.add(single_atom_index)
                        break

                center = calculate_center(coordinates, remaining_indices)
                furthest_index = remaining_indices[np.argmax([distance(center, coordinates[i]) for i in remaining_indices])]
                division = create_division(coordinates, furthest_index, rcut, assigned_indices)

                divisions.append(division)

        # Merge single-atom divisions into the nearest division
        divisions = merge_single_atom_divisions(divisions, coordinates, secure_distance)

        #divisions = [[1,4,6,7,0],[2,5],[3,8]]
        if rcut >= drop_hydrogen_rcut_largerthan:
                print(">=")
                type_map=type_map.split(",")
                print(type_map)
                divisions_plus_one = make_division_plus_one_dropHydrogen (file_path,divisions,type_map)
        else:
                divisions_plus_one = [[x + 1 for x in sublist] for sublist in divisions]
        print(divisions_plus_one)
        with open("divisions.json","w") as fo:
                json.dump(divisions_plus_one,fo)


def convert_lmpdata_to_pdb(dump_file_name="conf.lmp", outfile_name_prefix="ave_pre",type_map="H,C,N,O,F,P,S,Cl"):

        # Read LAMMPS data file with the correct atom_style
        #u = mda.Universe(dump_file_name, format='DATA', atom_style='id type x y z')
        u = mda.Universe(dump_file_name, format='DATA', atom_style='id type x y z')

        type_list = type_map.split(",")
        type_to_element = {str(i+1): elem for i, elem in enumerate(type_list)}
        #type_to_element = {
        #    '1': 'H',
        #    '2': 'C',
        #    '3': 'N',
        #    '4': 'O',
        #    '5': 'F',
        #    '6': 'P',
        #    '7': 'S',
        #    '8': 'Cl'
        #}

        # Set the elements attribute based on the types
        elements = np.array([type_to_element[atype] for atype in u.atoms.types])
        u.add_TopologyAttr('names', elements)

        #print(u.atoms.types)
        # Write all frames to the PDB file
        pdb_file = f"{outfile_name_prefix}_0.pdb"
        with mda.Writer(pdb_file, u.atoms.n_atoms, multiframe=True, reindex=False) as w:
                for ts in u.trajectory:
                        w.write(u.atoms)
        # Clean the PDB file to remove unwanted header lines using sed
        os.system(f"sed -i '/^HEADER/d;/^TITLE/d;/^REMARK/d' {pdb_file}")

        # Reload the PDB file to set bfactors
        u = mda.Universe(pdb_file, format='PDB')

        for ts in u.trajectory:
                u.atoms.tempfactors = np.ones(u.atoms.n_atoms)  # Set bfactor to 1.0 for all atoms

        # Write the modified PDB file
        modified_pdb_file = f"{outfile_name_prefix}.pdb"
        with mda.Writer(modified_pdb_file, u.atoms.n_atoms, multiframe=True, reindex=False) as w:
                #for ts in u.trajectory:
                w.write(u.atoms)

        # Clean the PDB file to remove unwanted header lines using sed
        os.system(f"sed -i '/^HEADER/d;/^TITLE/d;/^REMARK/d' {modified_pdb_file}")


def split_avepdb_local_pdbs (input_file="ave_pre.pdb", divisions="divisions.json"):
        with open(divisions, 'r') as fi:
                div_list = json.load(fi)
        with open(input_file, 'r') as f:
                lines = f.readlines()
        #print(lines)
        # Extract header (CRYST1 and MODEL)
        header = [line for line in lines if line.startswith(('CRYST1', 'MODEL'))]
        atoms = [line for line in lines if line.startswith('ATOM')]
        footer = [line for line in lines if line.startswith('ENDMDL')]
        # Split atoms into groups
        for i, indices in enumerate(div_list, 1):
                print(i,indices)
                output_file = f"ave_local_{i}.pdb"
                with open(output_file, 'w') as f:
                        f.writelines(header)
                        for idx in indices:
                                print(idx)
                                if int(idx)-1 < len(atoms):  # Adjust for 1-based indexing
                                        f.write(atoms[int(idx)-1])
                        f.writelines(footer)
                        print(footer)
                print(f"Created {output_file}")


def convert_lmpdump_to_pdb (divisions="divisions.json",type_map="H,C,N,O,F,P,S,Cl"):
        type_list = type_map.split(",")
        type_to_element = {str(i+1): elem for i, elem in enumerate(type_list)}
        #type_to_element = {
        #    '1': 'H',
        #    '2': 'C',
        #    '3': 'N',
        #    '4': 'O',
        #    '5': 'F',
        #    '6': 'P',
        #    '7': 'S',
        #    '8': 'Cl'
        #}

        with open(divisions, 'r') as fi:
                div_list = json.load(fi)

        for idx,val in enumerate (div_list):
                suffix=str(int(idx+1))
                outfile_name_prefix="ave_local_"+suffix
                dump_file_name = outfile_name_prefix + ".dump"

                # Read LAMMPS data file with the correct atom_style
                #u = mda.Universe(dump_file_name, format='DATA', atom_style='id type x y z')
                u = mda.Universe(dump_file_name, format='LAMMPSDUMP', atom_style='id type x y z')

                # Set the elements attribute based on the types
                elements = np.array([type_to_element[atype] for atype in u.atoms.types])
                u.add_TopologyAttr('names', elements)

                if len(u.trajectory) > 1:
                        u.trajectory[-1]

                #print(u.atoms.types)
                # Write all frames to the PDB file
                pdb_file = f"pre_{outfile_name_prefix}.pdb"
                with mda.Writer(pdb_file, u.atoms.n_atoms, multiframe=True, reindex=False) as w:
                        w.write(u.atoms)
                # Clean the PDB file to remove unwanted header lines using sed
                os.system(f"sed -i '/^HEADER/d;/^TITLE/d;/^REMARK/d' {pdb_file}")

                # Reload the PDB file to set bfactors
                uu = mda.Universe(pdb_file, format='PDB')

                for ts in uu.trajectory:
                        uu.atoms.tempfactors = np.ones(uu.atoms.n_atoms)  # Set bfactor to 1.0 for all atoms

                append_pdb_file=outfile_name_prefix+".pdb"
                # the first retained ave is the third record, overwrite till it.
                # first: all-0-coordinate record as the initialization of the lammps dump before all runs;
                # second: the averaged geometry during first unbiased MD segment;
                # third: the averaged geometry during the first PLUMED metaD segment, but with an empty HILLS files that exerts no bias (PLUMED 'rmsd' implementation),
                # therefore, the third record is still an equilibrium averaged geometry, and being used as the first time-referenced reference.
                if len(u.trajectory) <= 3:
                        with mda.Writer(append_pdb_file, uu.atoms.n_atoms, multiframe=True, reindex=False) as w:
                                w.write(uu.atoms)

                if len(u.trajectory) > 3:
                        #os.system(f"sed -i '/^END/d' {append_pdb_file}")
                        with open(append_pdb_file, 'a') as f:
                                with mda.Writer(f, uu.atoms.n_atoms, multiframe=True, reindex=False, format='PDB') as w:
                                        w.write(uu.atoms)

                os.system(f"sed -i '/^END$/d' {append_pdb_file}")
                os.system(f"sed -i '/^HEADER/d;/^TITLE/d;/^REMARK/d' {append_pdb_file}")


def merge_sep_ref_pdb_integrated_pdb (prefix_wildcard="ave_local_*.pdb", outputfile="ave.pdb"):
        files = sorted(glob.glob(prefix_wildcard))

        with open(outputfile, "w") as outfile:
                for file in files:
                        with open(file, "r") as infile:
                                outfile.write(infile.read())


def revise_cv_HILLS(filename="HILLS",divisions="divisions.json"):
        # we keep the spacing and format of the original HILLS
        with open(filename, "r") as f:
                lines = f.readlines()

        modified_lines=str()
        CV_index=0

        #reference_universe=Universe(reference)
        #target_universe=Universe(reference)

        for line in lines:
                if (line.strip()==False) or line.startswith("#"):  # Skip empty lines and comments
                        modified_lines += line
                else:
                        fields = line.split()
                        line_out=str()

                        if CV_index == 0 :
                                format_space=[] # here is the format definition for each field in a data row
                                raw_line_len=len(line)

                                for index,content in enumerate (fields):
                                        split = line.split(maxsplit=index) #space for field is calculated by the len diff between different split
                                        len_split = len (split[-1])

                                        if index == 0:
                                                space = raw_line_len - len_split + len(fields[index])
                                                format_space.append(space)
                                        elif index > 0:
                                                split_former = line.split(maxsplit=(index-1))
                                                len_split_former = len (split_former[-1])
                                                len_field = -len (fields[index-1]) + len (fields[index])
                                                space = len_split_former - len_split + len_field
                                                format_space.append(space)

                                        if index != 1:
                                                line_out += '{:>{width}}'.format(fields[index],width=format_space[index])
                                        else:
                                                #UPDATE CV
                                                updated_CV = str(update_CV(CV_index,last_CV=fields[index],divisions=divisions))
                                                line_out += '{:>{width}}'.format(updated_CV,width=format_space[index])

                                        if index == len(fields)-1 :
                                                line_out += f"\n"
                                modified_lines += line_out
                                CV_index += 1

                        elif CV_index >=1 :
                                for index,content in enumerate (fields):
                                        if index ==1 :
                                                #UPDATE CV
                                                fields[index] = str(update_CV(CV_index,last_CV=fields[index],divisions=divisions))
                                        line_out += '{:>{width}}'.format(fields[index],width=format_space[index])
                                        if index == len(fields)-1 :
                                                line_out += f"\n"
                                modified_lines += line_out
                                CV_index += 1

        with open(filename, "w") as fo:
                fo.writelines(modified_lines)


def update_CV (CV_index,last_CV,divisions):

        new_msd_global = 0
        old_sum_MSD = np.square(float(last_CV))
        sum_msd_divisions = 0

        with open (divisions) as fi:
                div_list=json.load(fi)

        for local_idx,val in enumerate(div_list):
                reference = "ave_local_"+str(int(local_idx)+1)+".pdb"
                reference_universe=Universe(reference)
                target_universe=Universe(reference)
                total_reference_number = len (reference_universe.trajectory)
                target_universe.trajectory[CV_index]
                if (CV_index +1) == total_reference_number:
                        sum_msd_align = 0
                        for idx in range (total_reference_number) :
                                reference_universe.trajectory[idx]  # set the reference frame
                                rmsd_orig,rmsd_align = align.alignto(reference_universe,target_universe,match_atoms=True,weights=None)
                                msd_align = np.square(rmsd_align)
                                sum_msd_align += msd_align
                        sum_msd_divisions += sum_msd_align

                else :
                        #recursively using the previous SD as recovered from the last_CV
                        reference_universe.trajectory[-1] #set reference
                        rmsd_orig,rmsd_align = align.alignto(reference_universe,target_universe,match_atoms=True,weights=None)
                        msd_align = np.square (rmsd_align)
                        sum_msd_divisions += msd_align

        if (CV_index +1) == total_reference_number:
                new_msd_global =sum_msd_divisions

        else:
                new_msd_global = old_sum_MSD+sum_msd_divisions

        new_CV = np.sqrt(new_msd_global)

        return (new_CV)


def revise_multirmsd_avepdb (file_in="ave.pdb",file_out="ave_multiRMSD.pdb"):
        os.system("cp %s %s" %(file_in,file_out))
        command_list=["sed -i '/^MODEL/d' %s" %file_out, "sed -i 's/ENDMDL/TER/g' %s" %file_out, "sed -i '$s/TER/END/' %s" %file_out]
        for command in command_list:
                os.system(command)

def revise_columnames (file1="HILLS",file2="COLVAR"):
        os.system("sed -i 's/rmsd/multi_rmsd/g' %s" %file1)
        os.system("sed -i 's/rmsd/multi_rmsd/g' %s" %file2)

def combine_bck_file (prefix_bck="bck.*.plumed.out", combined_file_name="bck_combined.plumed.out"):
        for bck_file in glob.glob(prefix_bck):
                os.system("cat %s >> %s && rm %s" %(bck_file,combined_file_name,bck_file))

def delete_avepdb_back_from_dpgen_workaround (file="ave.pdb"):
        os.system("rm %s" %file)

def revise_plumed_in_single_to_multi (file="input.plumed"):
        os.system("sed -i 's/RMSD/MULTI_RMSD/g' %s" %file)
        os.system("sed -i 's/rmsd/multi_rmsd/g' %s" %file)
        os.system("sed -i 's/OPTIMAL/MULTI-OPTIMAL/g' %s" %file)
        os.system("sed -i 's/ave.pdb/ave_multiRMSD.pdb/g' %s" %file)


def touch_hills (any):  #####seems new version plumed will check the existence of HILLS when reading restart
	os.system("touch HILLS")


#### Unite! #############################################
#### the metaD trunk has its opt branches now
#########################################################
# V3 version of snapshots_from_traj with improved bond change detection
# Enhanced with reaction coordinate analysis
# Patched code with verbose dupications

# the multipe steepest descending points in e_bias or potential-energy along metaD traj are located,
# then near-reactive windw is spaned with frames before and after the point (including the afterward steady state), requring the total drop being over a user-defined threshold
# truly reactive configurations within the window is found by geometry analysis (v.s. the initial reactant) checking newly -brealing or -formming bonds
# preceding windows's bonding changes are screened out from the latter windows's to avoid false-postive accumulation (bonding chane is v.s. the initial reactant)

#import pandas as pd
#from scipy.signal import argrelextrema, savgol_filter

def snapshots_from_traj(file="traj.dump", output_prefix="./opt_startpoint",
                       type_map="H,C,N,O,F,P,S,Cl", PACE=500, time_step=0.001, dump_freq=10,
                       cv_file="./COLVAR",
                       deriv_window=5, deriv_order=50, drop_threshold=0.4,
                       time_window=100, search_params="3,1,1,1",
                       min_search_window=50, maxmin_order=5,
                       log_file="log.lammps", enable_log_analysis="False",
                       log_deriv_window=5, log_deriv_order=50, log_drop_threshold=0.4,
                       log_time_window=100, log_search_params="3,1,1,1",
                       log_min_search_window=50, log_maxmin_order=5,
                       bond_factor=1.3, break_factor=3.5, break_max_factor=7.0, form_factor=1.3, form_distance_min=1.1):

        type_map = type_map.split(",")
        time_step=time_step*1000 #ps to fs
        search_params_list=search_params.split(",")
        search_params_list=[int(x) for x in search_params_list]

        # Convert string parameter to boolean
        enable_log_analysis = enable_log_analysis.lower() == "true" if isinstance(enable_log_analysis, str) else enable_log_analysis

        # Load bias data from PLUMED COLVAR file.
        def load_cv_data(file_path):
                data = []
                with open(file_path, 'r') as f:
                        for line in f:
                                if line.startswith('#! FIELDS'):
                                        continue
                                parts = line.strip().split()
                                if len(parts) == 3:
                                        data.append(parts)
                df = pd.DataFrame(data, columns=['time', 'multi_rmsd', 'metad.bias'])
                df = df.apply(pd.to_numeric)
                df.sort_values('time', inplace=True)
                df.drop_duplicates('time', keep='last', inplace=True)
                df.reset_index(drop=True, inplace=True)
                return df

        # Load potential-energy data from log.lammps.
        def load_log_data(file_path):

                data = []
                reading_data = False

                with open(file_path, 'r') as f:
                        for line in f:
                                # find the header of the block
                                if line.strip().startswith('Step') and 'PotEng' in line:

                                        headers = line.strip().split()
                                        poteng_idx = headers.index('PotEng')
                                        step_idx = headers.index('Step')
                                        reading_data = True
                                        continue

                                # end of the current data block
                                if reading_data and line.startswith('Loop'):
                                        reading_data = False
                                        continue

                                if reading_data:
                                        parts = line.strip().split()
                                        if len(parts) > max(poteng_idx, step_idx):
                                                try:
                                                        step = int(parts[step_idx])
                                                        poteng = float(parts[poteng_idx])
                                                        data.append({'step': step, 'poteng': poteng})
                                                except (ValueError, IndexError):
                                                        continue

                if not data:
                        return pd.DataFrame()

                df = pd.DataFrame(data)
                df.sort_values('step', inplace=True)
                df.drop_duplicates('step', keep='last', inplace=True)
                df.reset_index(drop=True, inplace=True)

                # compute frame indices using dump_freq.
                df['frame_idx'] = df['step'] // dump_freq

                return df

        # detect and expand key points (steppest desending)
        def find_extended_points(df, key_indices, search_params_list, min_search_window, maxmin_order):
                extended_indices = []
                point_types = []

                for idx in key_indices:
                        # Key point.
                        extended_indices.append(idx)
                        point_types.append('steep_drop')

                        # Extend with nearby points around the key point
                        f_num, f_step, b_num, b_step = search_params_list

                        # extend before
                        current = idx
                        for _ in range(f_num):
                                current = max(0, current - f_step)
                                if current != idx:
                                        extended_indices.append(current)
                                        point_types.append('nearby')

                        # extend after
                        current = idx
                        for _ in range(b_num):
                                current = min(len(df)-1, current + b_step)
                                if current != idx:
                                        extended_indices.append(current)
                                        point_types.append('nearby')


                        # Steady-point detection.
                        window_end = min(len(df), idx + min_search_window)

                        # find the first local-minimum interval after the key point
                        min_candidates = argrelextrema(
                                df['metad.bias'].iloc[idx:window_end].values,
                                np.less,
                                order=maxmin_order
                        )[0] + idx

                        if len(min_candidates) <= 1:
                                first_min = idx + int(min_search_window/10)
                        else:
                                first_min = min_candidates[1]

                        # find later local maxima to delimit the plateau.
                        max_candidates = argrelextrema(
                                df['metad.bias'].iloc[first_min:window_end].values,
                                np.greater,
                                order=maxmin_order
                        )[0] + first_min

                        if len(max_candidates) <= 3:
                                segment_end = window_end - int(min_search_window/10)
                        else:
                                segment_end = max_candidates[-3]

                        # pick the point closest to the plateau segment mean.
                        segment = df.iloc[first_min:segment_end+1]
                        if len(segment) == 0:
                                continue

                        mean_val = segment['metad.bias'].mean()
                        closest_idx = (segment['metad.bias'] - mean_val).abs().idxmin()

                        extended_indices.append(closest_idx)
                        point_types.append('steady')

                # Deduplicate points and unify point labels
                unique_indices = sorted(set(extended_indices))
                type_dict = {}
                for i, idx in enumerate(extended_indices):
                        priority = {'steep_drop':3, 'steady':2, 'nearby':1}.get(point_types[i], 0)
                        if idx not in type_dict or priority > type_dict[idx]['priority']:
                                type_dict[idx] = {'type': point_types[i], 'priority': priority}

                result_df = df.iloc[unique_indices].copy()
                result_df['type'] = [type_dict[idx]['type'] for idx in unique_indices]
                return result_df


        # Detection of bond changes
        def get_bond_radii():
                # covalent radii for common elements, in Angstrom.
                bond_radii = {
                        'H': 0.31, 'C': 0.76, 'N': 0.71, 'O': 0.66,
                        'F': 0.57, 'P': 1.07, 'S': 1.05, 'Cl': 1.02
                }
                return bond_radii

        def detect_bonds(coords, atom_types, type_map, bond_factor):
                # detect bonds in a molecule
                n_atoms = len(coords)
                bond_radii = get_bond_radii()
                bond_matrix = np.zeros((n_atoms, n_atoms), dtype=int)

                for i in range(n_atoms):
                        for j in range(i+1, n_atoms):
                                elem_i = type_map[atom_types[i]]
                                elem_j = type_map[atom_types[j]]

                                if elem_i in bond_radii and elem_j in bond_radii:
                                        max_bond_dist = bond_factor * (bond_radii[elem_i] + bond_radii[elem_j])
                                        dist = np.linalg.norm(coords[i] - coords[j])

                                        if dist < max_bond_dist:
                                                bond_matrix[i, j] = 1

                return bond_matrix

        def analyze_equilibrium_bonds(traj, bond_matrix, pace_frames):
                # Reactant : estimate equilibrium bond lengths and fluctuations from the unbiased MD run (loop 1, $PACE steps)
                n_atoms = len(traj[0]['coords'][0])
                bond_stats = {}

                # Collect distances for all initially bonded pairs over the $PACE frames.
                for i in range(n_atoms):
                        for j in range(i+1, n_atoms):
                                if bond_matrix[i, j] == 1:
                                        distances = []
                                        for frame_idx in range(min(pace_frames, len(traj))):
                                                coords = traj[frame_idx]['coords'][0]
                                                dist = np.linalg.norm(coords[i] - coords[j])
                                                distances.append(dist)

                                        bond_stats[(i, j)] = {
                                                'mean': np.mean(distances),
                                                'std': np.std(distances),
                                                'max': np.max(distances)
                                        }

                return bond_stats

        def check_bond_changes(coords, atom_types, type_map, initial_bonds, bond_stats,
                             break_factor, form_factor, break_max_factor, form_distance_min, excluded_pairs=None):
                # Near-reactive windows: check bond-changing atom pairs v.s. the reactant.
                n_atoms = len(coords)
                bond_radii = get_bond_radii()
                changed_pairs = []

                if excluded_pairs is None:
                        excluded_pairs = set()

                # Whether any initial bond is breaking
                for (i, j), stats in bond_stats.items():
                        if (i, j) in excluded_pairs:
                                continue

                        current_dist = np.linalg.norm(coords[i] - coords[j])

                        # define the lower threshold from bond-length statistics
                        threshold = stats['mean'] + break_factor * stats['std']

                        # lower threshold fallback to the maximum pair distance in unbiased MD, if the user defined value is too small
                        threshold = max(threshold, stats['max'])

                        # define the upper threshold for beaking check, a too-far atom-pair is less relavent to the breaking event
                        max_break_threshold = stats['mean'] + break_max_factor * stats['std']
                        max_break_threshold = max(max_break_threshold, stats['max'])

                        # accept distances in a physically plausible breaking range.
                        if threshold <= current_dist <= max_break_threshold:
                                changed_pairs.append((i, j))

                # Whether any new bond is forming
                for i in range(n_atoms):
                        for j in range(i+1, n_atoms):
                                if (i, j) in excluded_pairs:
                                        continue

                                if initial_bonds[i, j] == 0:  # not a previously bonded pair
                                        elem_i = type_map[atom_types[i]]
                                        elem_j = type_map[atom_types[j]]

                                        if elem_i in bond_radii and elem_j in bond_radii:
                                                covalent_sum = bond_radii[elem_i] + bond_radii[elem_j]
                                                max_bond_dist = form_factor * covalent_sum
                                                min_bond_dist = form_distance_min * covalent_sum
                                                current_dist = np.linalg.norm(coords[i] - coords[j])

                                                # accept distances in a plausible forming range.
                                                if min_bond_dist <= current_dist <= max_bond_dist:
                                                        changed_pairs.append((i, j))

                return changed_pairs

        # Potential-energy analysis helper,
        # analyze potential energy to find steep drops and expanded candidates.
        def analyze_potential_energy(log_df, log_params):

                log_deriv_window, log_deriv_order, log_drop_threshold, log_time_window, log_search_params, log_min_search_window, log_maxmin_order = log_params

                # parse search parameters.
                log_search_params_list = log_search_params.split(",")
                log_search_params_list = [int(x) for x in log_search_params_list]

                # step 1: compute gradient
                poteng_smoothed = savgol_filter(log_df['poteng'], log_deriv_window, 3)
                first_deriv = savgol_filter(poteng_smoothed, log_deriv_window, 3, deriv=1)

                # step 2: detect steep-drop points
                steep_drop_indices = argrelextrema(first_deriv, np.less, order=log_deriv_order)[0]

                # step 3: threshold filtering
                key_events = []
                for idx in steep_drop_indices:
                        # convert the time window into indices
                        time_window_steps = int(log_time_window / (time_step * dump_freq))
                        start_idx = max(0, idx - time_window_steps)
                        current_poteng = log_df.at[idx, 'poteng']
                        max_poteng_in_window = log_df.iloc[start_idx:idx+1]['poteng'].max()
                        if (max_poteng_in_window - current_poteng) >= log_drop_threshold:
                                key_events.append(idx)

                if not key_events:
                        return pd.DataFrame()

                key_events_df = log_df.iloc[key_events]

                # step 4: expanded points
                extended_indices = []
                point_types = []

                for idx in key_events:
                        extended_indices.append(idx)
                        point_types.append('steep_drop')

                        # add nearby points around the key event.
                        f_num, f_step, b_num, b_step = log_search_params_list

                        # extend before
                        current = idx
                        for _ in range(f_num):
                                current = max(0, current - f_step)
                                if current != idx:
                                        extended_indices.append(current)
                                        point_types.append('nearby')

                        # extend after
                        current = idx
                        for _ in range(b_num):
                                current = min(len(log_df)-1, current + b_step)
                                if current != idx:
                                        extended_indices.append(current)
                                        point_types.append('nearby')

                        # steady-point detection
                        window_end = min(len(log_df), idx + log_min_search_window)

                        # find the first local-minimum interval after the key point
                        min_candidates = argrelextrema(
                                log_df['poteng'].iloc[idx:window_end].values,
                                np.less,
                                order=log_maxmin_order
                        )[0] + idx

                        if len(min_candidates) <= 1:
                                first_min = idx + int(log_min_search_window/10)
                        else:
                                first_min = min_candidates[1]

                        # find later local maxima to delimit the plateau
                        max_candidates = argrelextrema(
                                log_df['poteng'].iloc[first_min:window_end].values,
                                np.greater,
                                order=log_maxmin_order
                        )[0] + first_min

                        if len(max_candidates) <= 3:
                                segment_end = window_end - int(log_min_search_window/10)
                        else:
                                segment_end = max_candidates[-3]

                        # pick the point closest to the plateau segment mean
                        segment = log_df.iloc[first_min:segment_end+1]
                        if len(segment) == 0:
                                continue

                        mean_val = segment['poteng'].mean()
                        closest_idx = (segment['poteng'] - mean_val).abs().idxmin()

                        extended_indices.append(closest_idx)
                        point_types.append('steady')

                # deduplicate points and unify point labels
                unique_indices = sorted(set(extended_indices))
                type_dict = {}
                for i, idx in enumerate(extended_indices):
                        priority = {'steep_drop':3, 'steady':2, 'nearby':1}.get(point_types[i], 0)
                        if idx not in type_dict or priority > type_dict[idx]['priority']:
                                type_dict[idx] = {'type': point_types[i], 'priority': priority}

                result_df = log_df.iloc[unique_indices].copy()
                result_df['type'] = [type_dict[idx]['type'] for idx in unique_indices]
                result_df['source'] = 'log'  # mark the candidate source

                return result_df

        # Main workflow.
        cv_df = load_cv_data(cv_file)

        # bias analysis path
        # step 1: compute derivatives
        bias_smoothed = savgol_filter(cv_df['metad.bias'], deriv_window, 3)
        first_deriv = savgol_filter(bias_smoothed, deriv_window, 3, deriv=1)

        # step 2: detect steep-drop points
        steep_drop_indices = argrelextrema(first_deriv, np.less, order=deriv_order)[0]

        # step 3: threshold filtering
        key_events = []
        for idx in steep_drop_indices:
                time_window_steps = int(time_window / (time_step * dump_freq))
                start_idx = max(0, idx - time_window_steps)
                current_bias = cv_df.at[idx, 'metad.bias']
                max_bias_in_window = cv_df.iloc[start_idx:idx+1]['metad.bias'].max()
                if (max_bias_in_window - current_bias) >= drop_threshold:
                        key_events.append(idx)
        key_events_df = cv_df.iloc[key_events]

        # step 4: expand key points
        extended_df = find_extended_points(
                cv_df,
                key_events_df.index.tolist(),
                search_params_list=search_params_list,
                min_search_window=min_search_window,
                maxmin_order=maxmin_order
        )
        extended_df['source'] = 'cv' # mark the candidate source

        # potential-energy analysis path
        all_candidates_df = extended_df.copy()  # initialize candidate structures.
        log_candidates_df = pd.DataFrame()  # initialize log-derived candidates.

        if enable_log_analysis and os.path.exists(log_file):
                try:
                        log_df = load_log_data(log_file)
                        log_params = (log_deriv_window, log_deriv_order, log_drop_threshold,
                                    log_time_window, log_search_params, log_min_search_window, log_maxmin_order)

                        log_extended_df = analyze_potential_energy(log_df, log_params)

                        if not log_extended_df.empty:
                                # convert log-analysis results to a biased-metaD(CV)-compatible format.
                                # frame_idx must be converted to the CV time index.
                                log_candidates = []
                                for _, row in log_extended_df.iterrows():
                                        frame_idx = row['frame_idx']
                                        # remove the PACE offset in unbiased MD to recover the CV index.
                                        cv_idx = frame_idx - int(PACE/dump_freq)
                                        if 0 <= cv_idx < len(cv_df):
                                                log_candidates.append({
                                                        'time': cv_df.iloc[cv_idx]['time'],
                                                        'multi_rmsd': cv_df.iloc[cv_idx]['multi_rmsd'],
                                                        'metad.bias': cv_df.iloc[cv_idx]['metad.bias'],
                                                        'type': row['type'],
                                                        'source': 'log'
                                                })

                                if log_candidates:
                                        log_candidates_df = pd.DataFrame(log_candidates)
                                        # rebuild indices to avoid duplicate or out-of-range entries.
                                        valid_indices = []
                                        for _, row in log_extended_df.iterrows():
                                                cv_idx = int(row['frame_idx'] - PACE/dump_freq)
                                                if 0 <= cv_idx < len(cv_df):
                                                        valid_indices.append(cv_df.index[cv_idx])

                                        # ensure the index length matches the candidate DataFrame.
                                        if len(valid_indices) == len(log_candidates_df):
                                                log_candidates_df.index = valid_indices
                                        else:
                                                # fall back to a default index if lengths do not match.
                                                log_candidates_df.reset_index(drop=True, inplace=True)

                                        # merge CV and log candidates, then deduplicate.
                                        all_candidates_df = pd.concat([extended_df, log_candidates_df])
                                        all_candidates_df = all_candidates_df.drop_duplicates()
                                        all_candidates_df = all_candidates_df.sort_index()

                                        print(f"CV find candidates {len(extended_df)}")
                                        print(f"PotEng find candidates {len(log_candidates_df)}")
                                        print(f"deduplicated candidates {len(all_candidates_df)}")
                except Exception as e:
                        print(f"WARN PotEng fails, only CV candidates {e}")
        else:
                if enable_log_analysis:
                        print(f"No lmp_log files, only CV candidates")
                print(f"only CV candidates, {len(extended_df)}")

        # Trajectory processing.
        traj = dpdata.System(file, "lammps/dump", type_map=type_map, nopbc=True)

        # Bond-change detection.
        # 1. detect initial-frame bonding
        initial_coords = traj[0]['coords'][0]
        atom_types = traj[0]['atom_types']
        initial_bonds = detect_bonds(initial_coords, atom_types, type_map, bond_factor)

        # 2. estimate bond-length statistics from the unbiased-MD region.
        pace_frame_num = int(PACE / dump_freq)
        bond_stats = analyze_equilibrium_bonds(traj, initial_bonds, pace_frame_num)

        print(f"\nInitial frame analysis:")
        print(f"  Total atoms: {len(atom_types)}")
        print(f"  Initial bonds: {np.sum(initial_bonds) // 2}")  # divide by 2 for symmetric matrix
        print(f"  Bonds in bond_stats: {len(bond_stats)}")

        # print some bond statistics
        if bond_stats:
                print(f"\nFirst 5 bond statistics:")
                for i, ((atom_i, atom_j), stats) in enumerate(bond_stats.items()):
                        if i >= 5:
                                break
                        elem_i = type_map[atom_types[atom_i]]
                        elem_j = type_map[atom_types[atom_j]]
                        print(f"    Bond({atom_i},{atom_j}) [{elem_i}-{elem_j}]: mean={stats['mean']:.3f}, std={stats['std']:.3f}, max={stats['max']:.3f}")

        # 3. seletc geometries with bond changes.
        filtered_indices = []
        excluded_pairs = set()  # previousely changed atom pairs to be excluded

        # group candidates to account for both CV and log sources
        cv_key_events = key_events  # original key events from CV analysis

        # extract key events from log analysis, if present
        log_key_events = []
        if enable_log_analysis and 'log_extended_df' in locals() and not log_extended_df.empty:
                # steep-drop log points as key events
                for _, row in log_extended_df.iterrows():
                        if row['type'] == 'steep_drop':
                                cv_idx = int(row['frame_idx'] - PACE/dump_freq)
                                if 0 <= cv_idx < len(cv_df):
                                        log_key_events.append(cv_idx)

        # merge key events and sort them by simulation time
        all_key_events = sorted(list(set(cv_key_events + log_key_events)))

        # assign each candidate structure to its key-event group
        candidate_to_group = {}  # candidate index -> group origin index

        for idx in all_candidates_df.index:
                # find the group that owns this candidate

                source_value = str(all_candidates_df.loc[idx, 'source'])
                candidate_type = str(all_candidates_df.loc[idx, 'type'])

                assigned_group = None

                # first check whether this is a key event
                if idx in all_key_events:
                        assigned_group = idx
                else:
                        # then check whether it is an expanded point from a key event.
                        for original_idx in all_key_events:
                                # select search parameters according to the candidate source.
                                if source_value == 'cv':
                                        search_params_current = search_params_list
                                        min_search_window_current = min_search_window
                                else:  # source == 'log'
                                        log_search_params_list = log_search_params.split(",")
                                        log_search_params_list = [int(x) for x in log_search_params_list]
                                        search_params_current = log_search_params_list
                                        min_search_window_current = log_min_search_window

                                f_num, f_step, b_num, b_step = search_params_current

                                # check extended points before key points
                                for i in range(1, f_num + 1):
                                        if idx == max(0, original_idx - i * f_step):
                                                assigned_group = original_idx
                                                break

                                if assigned_group:
                                        break

                                # check after
                                for i in range(1, b_num + 1):
                                        if idx == min(len(cv_df)-1, original_idx + i * b_step):
                                                assigned_group = original_idx
                                                break

                                if assigned_group:
                                        break

                                # check steady points within the min-search window.
                                if (original_idx <= idx <= min(len(cv_df)-1, original_idx + min_search_window_current) and
                                    candidate_type == 'steady'):
                                        assigned_group = original_idx
                                        break

                if assigned_group is not None:
                        candidate_to_group[idx] = assigned_group

        # Build group-index mapping: group origin -> all candidate structures.
        groups = {}
        for idx, group_idx in candidate_to_group.items():
                if group_idx not in groups:
                        groups[group_idx] = []
                groups[group_idx].append(idx)

        # sort candidates within each group by index
        for group_idx in groups:
                groups[group_idx] = sorted(groups[group_idx])

        # store bond-change information per candidate for the generation stage
        filtered_bond_changes = {}

        # Group-wise deduplication, process groups in time order so earlier changes suppress later duplicates.
        for original_idx in sorted(groups.keys()):
                group_changed_pairs = set()

                # exclude pairs changed in earlier groups
                group_excluded_pairs = excluded_pairs.copy()

                for idx in groups[original_idx]:
                        global_idx = int(PACE/dump_freq) + idx

                        if global_idx < len(traj):
                                frame_coords = traj[global_idx]['coords'][0]

                                # all frames in the same group use the same excluded-pair set, no frame-wise deduplication within each group
                                changed_pairs = check_bond_changes(frame_coords, atom_types, type_map,
                                                    initial_bonds, bond_stats, break_factor, form_factor,
                                                    break_max_factor, form_distance_min, group_excluded_pairs)

                                if len(changed_pairs) > 0:
                                        filtered_indices.append(idx)

                                        # record bond-change data for this candidate.
                                        atom_set = set()
                                        for i, j in changed_pairs:
                                                atom_set.add(i)
                                                atom_set.add(j)
                                        changed_atoms = sorted(list(atom_set))
                                        filtered_bond_changes[idx] = {
                                                "changed_atoms": changed_atoms,
                                                "changed_pairs": [(int(i), int(j)) for i, j in changed_pairs]
                                        }

                                        # collect this group's changes without updating group_excluded_pairs
                                        group_changed_pairs.update(changed_pairs)

                # add the all changes in this group to the global exclusion set that act on latter groups
                if group_changed_pairs:
                        excluded_pairs.update(group_changed_pairs)

        # use filtered indices
        if filtered_indices:
                unique_filtered_indices = sorted(list(set(filtered_indices)))
                final_extended_df = all_candidates_df.loc[unique_filtered_indices]
                # deduplicate again in case the DataFrame has repeated indices.
                final_extended_df = final_extended_df[~final_extended_df.index.duplicated(keep='first')]
                print(f"Filtered indices: {len(filtered_indices)} total, {len(unique_filtered_indices)} unique, final DataFrame: {len(final_extended_df)}")
        else:
                final_extended_df = pd.DataFrame()

        print(f"bonding distances checked candidates {len(final_extended_df)}")

        # Report the sources of final structures
        if len(final_extended_df) > 0:
                # count sources directly from the final source column
                cv_final_count = len(final_extended_df[final_extended_df['source'] == 'cv'])
                log_final_count = len(final_extended_df[final_extended_df['source'] == 'log'])

                # analyze overlap between original candidate pools
                cv_original_indices = set(extended_df.index)  #  original CV candidate indices
                if not log_candidates_df.empty:
                        log_original_indices = set(log_candidates_df.index)  # original log candidate indices
                        overlap_indices = cv_original_indices.intersection(log_original_indices)
                else:
                        log_original_indices = set()
                        overlap_indices = set()

                # structures selected by both original analyses
                final_indices = set(final_extended_df.index)
                overlap_in_final = overlap_indices.intersection(final_indices)

                print(f"Final structure sources:")
                print(f"  CV-labeled candidates: {cv_final_count}")
                print(f"  PotEng-labeled candidates: {log_final_count}")
                print(f"  Originally overlapped (found by both methods): {len(overlap_in_final)}")
                print(f"  Total final candidates: {len(final_extended_df)}")

                # additional diagnostics for the original candidate pools.
                print(f"Original analysis statistics:")
                print(f"  CV original candidates: {len(cv_original_indices)}")
                print(f"  PotEng original candidates: {len(log_original_indices)}")
                print(f"  Original overlap before filtering: {len(overlap_indices)}")
        else:
                print("No candidates after filtering.")

        # Stop if no valid candidates remain after filtering.
        if len(final_extended_df) == 0:
                print("No valid candidates found after filtering. Exiting.")
                return

        # Generate output files.
        generated_count = 0
        bond_changes_mapping = {}  # map each generated file to its changed atom pairs.

        # process structures in time order
        sorted_candidates = final_extended_df.sort_index()

        print(f"Processing {len(sorted_candidates)} candidates for file generation:")
        for i, idx in enumerate(sorted_candidates.index):
                # Preserve the existing filename convention.
                global_idx = int(PACE/dump_freq) + idx ###CAREFUL!!  DEFAULT, 1 pre PACE before the meaningful metaD starts
                global_step = int(global_idx * dump_freq)
                global_time = int(global_step * time_step)

                gjf_prefix = f"{output_prefix}_idx{global_idx:08d}_step{global_step:08d}_time{global_time:08d}"

                print(f"  Candidate {i+1}: idx={idx}, global_idx={global_idx}, prefix={gjf_prefix}")

                # output-file set
                output_files = {
                        "lmp": gjf_prefix+".lmp",
                }

                # Process the selected trajectory frame.
                if  global_idx < len(traj):
                        generated_count += 1
                        print(f"    -> Generating files for global_idx {global_idx}")
                        frame = traj[global_idx]
                        frame.to("lammps/lmp", output_files["lmp"])

                        # reuse bond-change information recorded during filtering
                        if idx in filtered_bond_changes:
                                bond_info = filtered_bond_changes[idx]
                                changed_atoms = bond_info["changed_atoms"]
                                changed_pairs = bond_info["changed_pairs"]
                                print(f"    -> Reused bond changes from filtering: {changed_atoms}")
                        else:
                                # this should not happen because generated structures come from filtered results
                                print(f"    -> WARNING: No bond change info for idx {idx}, using empty records")
                                changed_atoms = []
                                changed_pairs = []

                        # save this structure in the mapping file.
                        bond_changes_mapping[output_files["lmp"]] = {
                                "changed_atoms": changed_atoms,
                                "changed_pairs": changed_pairs
                        }

                else:
                        print(f"Skipped idx {idx} (global_idx {global_idx}) - exceeds trajectory length {len(traj)}")

        print(f"Actually generated files for {generated_count} structures out of {len(final_extended_df)} candidates")

        # Save the bond-change mapping to JSON.
        mapping_file = "bond_changes_mapping.json"
        with open(mapping_file, 'w') as f:
                json.dump(bond_changes_mapping, f, indent=2)
        print(f"Bond changes mapping saved to {mapping_file}")

        # Save reaction-event grouping information.
        if groups:
                reaction_groups_info = {}

                # record metadata for each group
                for group_idx in sorted(groups.keys()):
                        group_members = groups[group_idx]
                        # collect bond-change data discovered for this group.
                        group_bond_changes = []
                        for member_idx in group_members:
                                if member_idx in filtered_bond_changes:
                                        group_bond_changes.append({
                                                'cv_idx': int(member_idx),
                                                'global_idx': int(int(PACE/dump_freq) + member_idx),
                                                'changed_pairs': filtered_bond_changes[member_idx]['changed_pairs']
                                        })

                        reaction_groups_info[str(group_idx)] = {
                                'original_idx': int(group_idx),
                                'group_members': [int(x) for x in group_members],
                                'bond_changes': group_bond_changes,
                                'source': 'cv' if group_idx in cv_key_events else 'log'
                        }

                groups_file = "reaction_event_groups.json"
                with open(groups_file, 'w') as f:
                        json.dump(reaction_groups_info, f, indent=2)
                print(f"Reaction event groups saved to {groups_file} ({len(reaction_groups_info)} groups)")

                # Print group statistics.
                print(f"\nReaction event groups summary:")
                for group_idx in sorted(groups.keys()):
                        source = 'CV' if group_idx in cv_key_events else 'PotEng'
                        print(f"  Group {group_idx} ({source}): {len(groups[group_idx])} candidates")


# V2 version of convert_xyz_lmpdump_deepmdnpymixed with reaction coordinate sampling
# enhanced witharc-length based sparsified frame selection

#import re
#from collections import defaultdict

def parse_gauxyz_and_get_atom_types_list(filename, type_map_str):
        # Parses an XYZ file, extracts frames, and determines the ordered list of atom types.
        # The list of atom types is crucial as it defines the mapping from a frame-specific
        # atom index to its element symbol.
        with open(filename, 'r') as f:
                lines = f.readlines()

        frames = []
        current_frame_lines = []

        # Heuristic to find the start of the first frame's atom list
        first_atom_line_index = 2
        for i, line in enumerate(lines):
                parts = line.strip().split()
                if len(parts) == 4:
                        try:
                                float(parts[1])
                                float(parts[2])
                                float(parts[3])
                                first_atom_line_index = i
                                break
                        except ValueError:
                                continue

        num_atoms_str = lines[first_atom_line_index - 2].strip()
        if not num_atoms_str.isdigit():
                raise ValueError(f"Could not determine number of atoms for {filename}")
        num_atoms = int(num_atoms_str)

        # Extract the atom types from the first frame to establish a canonical order
        atom_types_list = []
        for i in range(num_atoms):
                line_index = first_atom_line_index + i
                if line_index < len(lines):
                        atom_symbol = lines[line_index].strip().split()[0]
                        atom_types_list.append(atom_symbol)

        # Now, parse all frames based on the determined number of atoms
        i = 0
        while i < len(lines):
                line = lines[i].strip()
                if line.isdigit() and int(line) == num_atoms:
                        frame_lines = lines[i+2 : i+2+num_atoms]
                        if len(frame_lines) == num_atoms:
                                frames.append(frame_lines)
                        i += 2 + num_atoms
                else:
                        i += 1

        return frames, atom_types_list


def analyze_equilibrium_bonds(md_coords_list, atom_types_list, initial_bonds, pace_frames):
        # Analyzes bond lengths over equilibrium frames (from MD) to get mean and std.
        # This provides a statistical baseline for identifying bond breaking events.
        bond_stats = {}
        bond_distances = defaultdict(list)

        num_md_frames = len(md_coords_list)
        for frame_idx in range(min(pace_frames, num_md_frames)):
                coords = md_coords_list[frame_idx]

                if len(coords) != len(atom_types_list): continue

                for i, j in initial_bonds:
                        if i < len(coords) and j < len(coords):
                                dist = np.linalg.norm(coords[i] - coords[j])
                                bond_distances[(i,j)].append(dist)

        for bond, distances in bond_distances.items():
                if distances:
                        bond_stats[bond] = {"mean": np.mean(distances), "std": np.std(distances)}

        return bond_stats


def detect_initial_bonds(first_frame_coords, atom_types_list, bond_factor):
        # Detects the initial set of bonds from the first frame of a trajectory,
        # based on covalent radii. This serves as the reference chemical structure.
        n_atoms = len(first_frame_coords)
        initial_bonds = set()
        # Expanded covalent radii dictionary
        covalent_radii = {'H': 0.31, 'C': 0.76, 'N': 0.71, 'O': 0.66, 'F': 0.57,
                      'P': 1.07, 'S': 1.05, 'Cl': 1.02, 'Br': 1.20, 'I': 1.39,
                      'Si': 1.11}

        for i in range(n_atoms):
                for j in range(i + 1, n_atoms):
                        elem_i = atom_types_list[i]
                        elem_j = atom_types_list[j]
                        # Use a default radius for unlisted elements to avoid errors
                        radius_i = covalent_radii.get(elem_i, 0.7)
                        radius_j = covalent_radii.get(elem_j, 0.7)

                        if np.linalg.norm(first_frame_coords[i] - first_frame_coords[j]) < bond_factor * (radius_i + radius_j):
                                initial_bonds.add(tuple(sorted((i, j))))
        return initial_bonds


def get_coords_from_frame(frame_lines):
        coords = []
        for line in frame_lines:
                parts = line.strip().split()
                if len(parts) >= 4:
                        coords.append([float(p) for p in parts[1:4]])
        return np.array(coords)

def calculate_normalized_reaction_coordinate(pairs, coords, atom_types_list, params, bond_stats, initial_bonds_ref):
        # Calculates the normalized reaction coordinate (RC) for a single frame.
        # This is the core of Stage 2, using flexible parameters to quantify the
        # progress of bond changes identified in Stage 1.
        if not pairs:
                return 0.0, False

        covalent_radii = {'H': 0.31, 'C': 0.76, 'N': 0.71, 'O': 0.66, 'F': 0.57,
                      'P': 1.07, 'S': 1.05, 'Cl': 1.02, 'Br': 1.20, 'I': 1.39,
                      'Si': 1.11}

        normalized_values = []

        for i, j in pairs:
                pair = tuple(sorted((i, j)))
                current_dist = np.linalg.norm(coords[i] - coords[j])

                is_initially_bonded = pair in initial_bonds_ref

                if is_initially_bonded: # Potential bond breaking
                        stats = bond_stats.get(pair)
                        if not stats: continue

                        # Use double-sided thresholds for bond breaking
                        min_dist = stats['mean'] + params['break_min_std'] * stats['std']
                        max_dist = stats['mean'] + params['break_max_std'] * stats['std']

                        if current_dist > min_dist:
                                raw_val = (current_dist - min_dist) / (max_dist - min_dist) if max_dist > min_dist else 0
                                normalized_values.append(np.clip(raw_val, 0, 1))

                else: # Potential bond formation
                        elem_i, elem_j = atom_types_list[i], atom_types_list[j]
                        radius_i = covalent_radii.get(elem_i, 0.7)
                        radius_j = covalent_radii.get(elem_j, 0.7)
                        covalent_sum = radius_i + radius_j

                        # Use double-sided thresholds for bond formation
                        max_dist = params['form_max_factor'] * covalent_sum
                        min_dist = params['form_min_factor'] * covalent_sum

                        if current_dist < max_dist:
                                raw_val = (max_dist - current_dist) / (max_dist - min_dist) if max_dist > min_dist else 0
                                normalized_values.append(np.clip(raw_val, 0, 1))

        if not normalized_values:
                return 0.0, False

        rc_val = np.linalg.norm(normalized_values) / np.sqrt(len(normalized_values))
        is_reactive = rc_val > 1e-6

        return rc_val, is_reactive


def convert_xyz_lmpdump_deepmdnpymixed(
        xyz_suffix_wildcards="*dp_ts.xyz",
        type_map="H,C,N,O,F,P,S,Cl",

        # MD trajectory for bond statistics
        md_traj_dump_path="traj.dump",
        force_recompute_bond_stats="False",
        PACE=500,
        dump_freq=5,

        # Reaction coordinate sampling parameters
        enable_reaction_coord_sampling="False",
        arc_sampling_points=10,

        # Stage 1 parameters (strict thresholds)
        initial_bond_factor=1.2,
        stage1_break_std_factor=4.0, # Very strict: mean + 4.0*std for bond breaking
        stage1_form_factor=1.35,       # Strict: 1.35 * covalent_sum for bond formation

        # Stage 2 parameters (flexible thresholds for RC calculation)
        stage2_break_min_std=3.3,
        stage2_break_max_std=20.0,
        stage2_form_min_factor=1.1,
        stage2_form_max_factor=1.4
):
        force_recompute_bond_stats = force_recompute_bond_stats.lower() == "true"
        enable_reaction_coord_sampling = enable_reaction_coord_sampling.lower() == "true"
        # keep_first_last_if_empty = keep_first_last_if_empty.lower() == "true" # now is default

        print("--- Starting Conversion v2 ---")

        # 1. Initialization
        atom_types_map = {atom: i + 1 for i, atom in enumerate(type_map.split(','))}
        global_reaction_info = {'files_processed': []}
        bond_changes_mapping = {}
        reaction_groups_info = {}

        if enable_reaction_coord_sampling:
                if os.path.exists("bond_changes_mapping.json"):
                        with open("bond_changes_mapping.json", 'r') as f:
                                bond_changes_mapping = json.load(f)
                        print(f"Loaded {len(bond_changes_mapping)} entries from bond_changes_mapping.json")
                if os.path.exists("reaction_event_groups.json"):
                        with open("reaction_event_groups.json", 'r') as f:
                                reaction_groups_info = json.load(f)
                        print(f"Loaded {len(reaction_groups_info)} groups from reaction_event_groups.json")

        # Parameters for Stage 2 RC calculation
        rc_params = {
                'break_min_std': stage2_break_min_std, 'break_max_std': stage2_break_max_std,
                'form_min_factor': stage2_form_min_factor, 'form_max_factor': stage2_form_max_factor
        }

        # 2. Main loop over file patterns (e.g., *_dp_ts.xyz, *_neb_ts.xyz)
        # Cache for MD trajectory statistics to avoid recomputation
        md_stats_cache = {}

        for xyz_suffix in xyz_suffix_wildcards.split(','):
                xyz_suffix = xyz_suffix.strip()
                name_key = xyz_suffix.replace("*", "").replace(".xyz", "")
                lmpdump_file = f"traj_{name_key}.dump"
                deepmd_dir = f"data_{name_key}"
                if os.path.exists(lmpdump_file): os.remove(lmpdump_file)

                xyz_files = sorted(glob.glob(xyz_suffix))
                if not xyz_files:
                        print(f"Warning: No files found for pattern '{xyz_suffix}'. Skipping.")
                        continue

                print(f"\nProcessing pattern: '{xyz_suffix}' ({len(xyz_files)} files)")
                global_frame_counter = 0

                # 3. Process each trajectory file within the pattern
                for xyz_file in xyz_files:
                        print(f"\nProcessing file: {os.path.basename(xyz_file)}")
                        print(f"  DEBUG: enable_reaction_coord_sampling = {enable_reaction_coord_sampling}")

                        try:
                                frames, atom_types_list = parse_gauxyz_and_get_atom_types_list(xyz_file, type_map)
                                if not frames:
                                        print(f"     Warning: No frames parsed from {xyz_file}. Skipping.")
                                        continue
                        except Exception as e:
                                print(f"     Error parsing {xyz_file}: {e}. Skipping.")
                                continue

                        num_atoms = len(atom_types_list)
                        first_frame_coords = get_coords_from_frame(frames[0])
                        print(f"  DEBUG: Parsed {len(frames)} frames, {num_atoms} atoms")

                        # --- Group Exclusion Logic ---
                        excluded_pairs_for_file = set()
                        if enable_reaction_coord_sampling and reaction_groups_info and bond_changes_mapping:
                                current_group_id_str = None
                                match = re.search(r'idx(\d+)', os.path.basename(xyz_file))
                                if match:
                                        # Identify which reaction-event group produced this dimer trajectory.
                                        # Earlier groups provide the accumulated changes to exclude below.
                                        file_global_idx = int(match.group(1))
                                        for group_id, group_info in reaction_groups_info.items():
                                                if any(bc.get('global_idx') == file_global_idx for bc in group_info.get('bond_changes', [])):
                                                        current_group_id_str = group_id
                                                        break

                                if current_group_id_str:
                                        current_group_id_num = int(current_group_id_str.split('_')[-1])
                                        print(f"     File belongs to group {current_group_id_str}. Building exclusion list.")

                                        for group_id_to_check, group_info in reaction_groups_info.items():
                                                group_id_to_check_num = int(group_id_to_check.split('_')[-1])

                                                if group_id_to_check_num < current_group_id_num:
                                                        # Union this earlier event's recorded incremental changes;
                                                        # first-stage guarantees they exclude the current event.
                                                        for bc in group_info.get('bond_changes', []):
                                                                for pair in bc.get('changed_pairs', []):
                                                                        excluded_pairs_for_file.add(tuple(sorted(pair)))

                                        if excluded_pairs_for_file:
                                                print(f"     Excluding {len(excluded_pairs_for_file)} pairs from previous groups' recorded incremental changes.")
                                                print(f"     Excluded pairs: {sorted(list(excluded_pairs_for_file))}")

                        # --- Stage 1: Build Unified Reaction Coordinate Space ---
                        unified_reaction_pairs = set()

                        # First, inherit bond changes from snap function (if available)
                        if enable_reaction_coord_sampling and bond_changes_mapping:
                                # Try to find the corresponding entry in bond_changes_mapping
                                base_name = os.path.basename(xyz_file).replace('_dp_ts.xyz', '.lmp').replace('_neb_ts.xyz', '.lmp')

                                if base_name in bond_changes_mapping:
                                        inherited_pairs = bond_changes_mapping[base_name].get('changed_pairs', [])
                                        for pair in inherited_pairs:
                                                unified_reaction_pairs.add(tuple(sorted(pair)))
                                        if inherited_pairs:
                                                print(f"     Inherited {len(inherited_pairs)} bond change(s) from snap function: {inherited_pairs}")
                                else:
                                        print(f"     No bond changes found in mapping for {base_name}")

                        # A. Get reference bond information (from MD or first frame)
                        bond_stats_path = f"bond_stats_{num_atoms}.json"
                        initial_bonds_path = f"initial_bonds_{num_atoms}.json"

                        initial_bonds_ref = set()
                        bond_stats_ref = {}

                        # Logic to load/compute bond stats and initial bonds
                        has_md_data = os.path.exists(md_traj_dump_path)

                        if has_md_data and (force_recompute_bond_stats or not os.path.exists(bond_stats_path)):
                                # Check if we have cached MD stats for this atom count
                                cache_key = f"{num_atoms}_{md_traj_dump_path}"

                                if cache_key in md_stats_cache:
                                        print(f"     Using cached MD bond stats for {num_atoms} atoms")
                                        initial_bonds_ref, bond_stats_ref = md_stats_cache[cache_key]
                                else:
                                        print(f"     Calculating bond stats from MD traj: {md_traj_dump_path}")
                                        md_system = dpdata.System(md_traj_dump_path, fmt='lammps/dump', type_map=type_map.split(','))
                                        md_coords_list = md_system['coords']

                                        # For MD, initial bonds are also from its first frame
                                        md_first_coords = md_coords_list[0]
                                        initial_bonds_ref = detect_initial_bonds(md_first_coords, atom_types_list, initial_bond_factor)
                                        pace_frame_num = int(PACE / dump_freq)
                                        bond_stats_ref = analyze_equilibrium_bonds(md_coords_list, atom_types_list, initial_bonds_ref, pace_frames=pace_frame_num)

                                        # Cache the results
                                        md_stats_cache[cache_key] = (initial_bonds_ref, bond_stats_ref)

                                        # Also save to files
                                        with open(bond_stats_path, 'w') as f: json.dump({str(k): v for k, v in bond_stats_ref.items()}, f, indent=2)
                                        with open(initial_bonds_path, 'w') as f: json.dump(list(initial_bonds_ref), f, indent=2)
                        elif os.path.exists(bond_stats_path):
                                with open(bond_stats_path, 'r') as f:
                                        bond_stats_ref = {eval(k): v for k, v in json.load(f).items()}
                                with open(initial_bonds_path, 'r') as f:
                                        initial_bonds_ref = {tuple(p) for p in json.load(f)}
                                print("     Loaded pre-computed bond stats and initial bonds.")
                        else:
                                print("     Warning: No MD data. Using first frame for initial bonds. Bond breaking detection will be less reliable.")
                                initial_bonds_ref = detect_initial_bonds(first_frame_coords, atom_types_list, initial_bond_factor)

                        # B. Iterate through frames to find all unique bond changes
                        covalent_radii = {'H': 0.31, 'C': 0.76, 'N': 0.71, 'O': 0.66, 'F': 0.57, 'P': 1.07, 'S': 1.05, 'Cl': 1.02}

                        # Track distance ranges for each potential bond change
                        bond_change_distances = {}

                        for frame_idx, frame in enumerate(frames):
                                coords = get_coords_from_frame(frame)
                                if coords.shape[0] != num_atoms: continue

                                for i in range(num_atoms):
                                        for j in range(i + 1, num_atoms):
                                                pair = tuple(sorted((i, j)))

                                                if pair in excluded_pairs_for_file:
                                                        continue

                                                dist = np.linalg.norm(coords[i] - coords[j])

                                                # Track distance range for this pair
                                                if pair not in bond_change_distances:
                                                        bond_change_distances[pair] = {'min': dist, 'max': dist, 'distances': []}
                                                else:
                                                        bond_change_distances[pair]['min'] = min(bond_change_distances[pair]['min'], dist)
                                                        bond_change_distances[pair]['max'] = max(bond_change_distances[pair]['max'], dist)
                                                bond_change_distances[pair]['distances'].append(dist)

                                                is_initially_bonded = pair in initial_bonds_ref

                                                if is_initially_bonded: # Check for bond breaking
                                                        # Skip H atom bond breaking (free radical reactions)
                                                        elem_i, elem_j = atom_types_list[i], atom_types_list[j]
                                                        if elem_i == 'H' or elem_j == 'H':
                                                                continue

                                                        stats = bond_stats_ref.get(pair)
                                                        if stats and dist > stats['mean'] + stage1_break_std_factor * stats['std']:
                                                                unified_reaction_pairs.add(pair)
                                                else: # Check for bond formation
                                                        elem_i, elem_j = atom_types_list[i], atom_types_list[j]
                                                        covalent_sum = covalent_radii.get(elem_i, 0.7) + covalent_radii.get(elem_j, 0.7)
                                                        if dist < stage1_form_factor * covalent_sum:
                                                                unified_reaction_pairs.add(pair)

                        unified_reaction_pairs = sorted(list(unified_reaction_pairs))
                        print(f"     DEBUG: Total frames analyzed: {len(frames)}")
                        print(f"     DEBUG: Initial bonds found: {len(initial_bonds_ref)}")
                        print(f"     DEBUG: Bond stats available: {len(bond_stats_ref)}")

                        # Print detailed info about detected bond changes
                        if unified_reaction_pairs:
                                print(f"     Unified Reaction Space (Stage 1): {len(unified_reaction_pairs)} dimensions.")
                                print(f"     Detected bond changes with distance ranges and thresholds:")
                                for pair in unified_reaction_pairs:
                                        i, j = pair
                                        elem_i, elem_j = atom_types_list[i], atom_types_list[j]
                                        dist_info = bond_change_distances[pair]

                                        if pair in initial_bonds_ref:
                                                # Bond breaking
                                                stats = bond_stats_ref.get(pair, {'mean': 0, 'std': 0})
                                                threshold = stats['mean'] + stage1_break_std_factor * stats['std']
                                                print(f"       Breaking {pair} ({elem_i}{i}-{elem_j}{j}): range [{dist_info['min']:.3f}, {dist_info['max']:.3f}] A, threshold > {threshold:.3f} A")
                                        else:
                                                # Bond formation
                                                covalent_sum = covalent_radii.get(elem_i, 0.7) + covalent_radii.get(elem_j, 0.7)
                                                threshold = stage1_form_factor * covalent_sum
                                                print(f"       Forming {pair} ({elem_i}{i}-{elem_j}{j}): range [{dist_info['min']:.3f}, {dist_info['max']:.3f}] A, threshold < {threshold:.3f} A")

                        if not unified_reaction_pairs:
                                print("     WARNING: No additional bond changes detected beyond inherited ones.")
                                print("     This should not happen if snap function worked correctly.")
                                print("     Using uniform sampling as emergency fallback.")
                                selected_indices = None
                        else:
                                print(f"     Unified Reaction Space (Stage 1): {len(unified_reaction_pairs)} dimensions.")
                                print(f"     Pairs: {unified_reaction_pairs}")

                        # --- Stage 2: Calculate RCs and Perform Arc-Length Sampling ---
                        if unified_reaction_pairs and enable_reaction_coord_sampling:
                                reactive_frames_data = []

                                # Always include first and last frames
                                first_frame_coords = get_coords_from_frame(frames[0])
                                last_frame_coords = get_coords_from_frame(frames[-1])

                                # Calculate RC for first frame
                                rc_val_first, _ = calculate_normalized_reaction_coordinate(
                                        unified_reaction_pairs, first_frame_coords, atom_types_list, rc_params, bond_stats_ref, initial_bonds_ref
                                )
                                reactive_frames_data.append({'index': 0, 'rc': rc_val_first, 'coords': first_frame_coords})

                                # Process middle frames
                                for frame_idx in range(1, len(frames)-1):
                                        frame = frames[frame_idx]
                                        coords = get_coords_from_frame(frame)
                                        if coords.shape[0] != num_atoms: continue

                                        # Use flexible params for Stage 2 calculation
                                        rc_val, is_reactive = calculate_normalized_reaction_coordinate(
                                                unified_reaction_pairs, coords, atom_types_list, rc_params, bond_stats_ref, initial_bonds_ref
                                        )

                                        if is_reactive:
                                                reactive_frames_data.append({'index': frame_idx, 'rc': rc_val, 'coords': coords})

                                # Calculate RC for last frame
                                rc_val_last, _ = calculate_normalized_reaction_coordinate(
                                        unified_reaction_pairs, last_frame_coords, atom_types_list, rc_params, bond_stats_ref, initial_bonds_ref
                                )
                                reactive_frames_data.append({'index': len(frames)-1, 'rc': rc_val_last, 'coords': last_frame_coords})

                                # Count reactive vs non-reactive (including all frames)
                                num_reactive = len([d for d in reactive_frames_data if d['rc'] > 0])
                                num_non_reactive = len(frames) - num_reactive
                                print(f"     Frame statistics: {num_reactive} reactive, {num_non_reactive} non-reactive (total {len(frames)} frames)")

                                if len(reactive_frames_data) <= 2:
                                        # Only first and last frames
                                        selected_indices = [0, len(frames)-1]
                                        print(f"     No reactive frames found in middle. Using only first and last frames.")
                                else:
                                        # Arc-length sampling
                                        if len(reactive_frames_data) > 1:
                                                points = np.array([d['rc'] for d in reactive_frames_data]).reshape(-1, 1)
                                                distances = np.sqrt(np.sum(np.diff(points, axis=0)**2, axis=1))
                                                arc_lengths = np.insert(np.cumsum(distances), 0, 0)

                                                total_arc_length = arc_lengths[-1]
                                                print(f"     Arc length sampling: total arc length = {total_arc_length:.6f}")
                                                print(f"     Arc lengths at points: {[f'{x:.6f}' for x in arc_lengths[:min(5, len(arc_lengths))]][:5]}... (showing first 5)")

                                                if total_arc_length < 1e-6:
                                                        # If arc length is zero, sample uniformly from reactive frames
                                                        step = max(1, len(reactive_frames_data) // arc_sampling_points)
                                                        sampled_arc_indices = range(0, len(reactive_frames_data), step)
                                                else:
                                                        sampled_lengths = np.linspace(0, total_arc_length, arc_sampling_points)
                                                        sampled_arc_indices = []
                                                        available_indices = list(range(len(reactive_frames_data)))

                                                        for target_length in sampled_lengths:
                                                                if not available_indices:
                                                                        break

                                                                # Find the closest available point to the target arc length
                                                                min_diff = float('inf')
                                                                best_idx = None

                                                                for idx in available_indices:
                                                                        diff = abs(arc_lengths[idx] - target_length)
                                                                        if diff < min_diff:
                                                                                min_diff = diff
                                                                                best_idx = idx

                                                                if best_idx is not None:
                                                                        sampled_arc_indices.append(best_idx)
                                                                        available_indices.remove(best_idx)

                                                        # Print arc sampling details
                                                        print(f"     Target arc positions: {[f'{l:.6f}' for l in sampled_lengths]}")
                                                        print(f"     Selected indices and their arc positions:")
                                                        for i, arc_idx in enumerate(sampled_arc_indices):
                                                                frame_idx = reactive_frames_data[arc_idx]['index']
                                                                arc_pos = arc_lengths[arc_idx]
                                                                print(f"       Point {i}: reactive frame {arc_idx} (global frame {frame_idx}) at arc position {arc_pos:.6f}")

                                                # Get unique indices from arc sampling
                                                selected_indices = sorted(list(set(reactive_frames_data[i]['index'] for i in sampled_arc_indices)))
                                                print(f"     Arc-sampled {len(sampled_arc_indices)} points -> {len(selected_indices)} unique frames")
                                        else: # Only one reactive frame (should not happen with first/last included)
                                                selected_indices = [reactive_frames_data[0]['index']]
                        else:
                                selected_indices = None


                        # --- Fallback to Uniform Sampling ---
                        if selected_indices is None:
                                print("     Using uniform sampling as fallback.")
                                num_select = arc_sampling_points
                                if len(frames) <= num_select:
                                        selected_indices = list(range(len(frames)))
                                else:
                                        indices = np.linspace(0, len(frames) - 1, num_select, dtype=int)
                                        selected_indices = sorted(list(set(indices)))

                        print(f"     Final selection: {len(selected_indices)} frames")

                        if not selected_indices:
                                print("     Warning: No frames selected for output.")
                                continue

                        # --- Write selected frames to LAMMPS dump file ---
                        with open(lmpdump_file, 'a') as f:
                                for frame_idx in selected_indices:
                                        frame_lines = frames[frame_idx]
                                        f.write(f"ITEM: TIMESTEP\n{global_frame_counter}\n")
                                        f.write(f"ITEM: NUMBER OF ATOMS\n{num_atoms}\n")
                                        f.write("ITEM: BOX BOUNDS pp pp pp\n0.0 100.0\n0.0 100.0\n0.0 100.0\n")
                                        f.write("ITEM: ATOMS id type x y z\n")

                                        atom_coords = get_coords_from_frame(frame_lines)
                                        for atom_id, (symbol, coords) in enumerate(zip(atom_types_list, atom_coords), 1):
                                                type_id = atom_types_map.get(symbol, 0)
                                                f.write(f"{atom_id} {type_id} {coords[0]:.6f} {coords[1]:.6f} {coords[2]:.6f}\n")
                                        global_frame_counter += 1

                        print(f"     Selected {len(selected_indices)} frames. Appended to {lmpdump_file}.")
                        # Store info for global summary
                        info = {
                                'file': os.path.basename(xyz_file), 'num_atoms': num_atoms,
                                'total_frames': len(frames), 'selected_frames_count': len(selected_indices),
                                'sampling_method': 'arc_length' if unified_reaction_pairs and enable_reaction_coord_sampling else 'uniform',
                                'rc_dimensions': len(unified_reaction_pairs),
                                'rc_pairs': unified_reaction_pairs,
                                'selected_indices': [int(idx) for idx in selected_indices],  # Convert to int
                        }
                        base_name = os.path.basename(xyz_file).rsplit('.', 1)[0]
                        with open(f"arc_sampling_info_{base_name}.json", 'w') as f:
                                json.dump(info, f, indent=2)
                        global_reaction_info['files_processed'].append(info)


                # 4. Convert the entire dump file for the pattern to DeepMD format
                if global_frame_counter > 0:
                        print(f"  Summary for '{xyz_suffix}': Total {global_frame_counter} frames saved to {lmpdump_file}")
                        try:
                                dpdata.System(lmpdump_file, "lammps/dump", type_map=type_map.split(',')).to("deepmd/npy/mixed", deepmd_dir, set_size=9999999)
                                print(f"  Successfully converted {lmpdump_file} to DeepMD format in '{deepmd_dir}'")
                        except Exception as e:
                                print(f"  Error during final conversion with dpdata: {e}")

        # 5. Final summary
        if global_reaction_info['files_processed']:
                with open("global_reaction_coordinate_info.json", 'w') as f:
                        json.dump(global_reaction_info, f, indent=2)
                print("\n--- Global Reaction Coordinate Info Saved ---")

        print("\n--- Conversion v2 Finished ---\n")


# Dimer-related functions extracted from dimer_dp_single_pair_fast.py

# Custom log file handler for dimer calculations
class DimerLogFile:
        # Real-time log file handler for immediate output
        # No buffering to ensure real-time logging during dimer calculations
        def __init__(self, filename):
                self.filename = filename
                self.closed = False
                # Clear/create the file initially
                with open(self.filename, 'w') as f:
                        pass

        def write(self, text):
                if not self.closed:
                        # Write immediately without buffering
                        with open(self.filename, 'a') as f:
                                f.write(text)
                                f.flush()  # Force flush to disk for real-time output

        def flush(self):
                # Ensure any system buffers are flushed
                import sys
                sys.stdout.flush()

        def close(self):
                self.closed = True

        def __enter__(self):
                return self

        def __exit__(self, exc_type, exc_val, exc_tb):
                self.close()

        def __del__(self):
                self.close()

def print_dimer_info(d_atoms, label=""):
        # Helper function to print dimer state information
        if hasattr(d_atoms, 'get_curvature'):
                try:
                        curvature = d_atoms.get_curvature()
                except:
                        curvature = 'N/A'
        else:
                curvature = 'N/A'

        forces = d_atoms.get_forces()
        max_force = np.max(np.linalg.norm(forces, axis=1))

        if label:
                print(f"\n{label}:")
        print(f"  Max force: {max_force:.4f} eV/A")
        print(f"  Curvature: {curvature}")

def read_lammps_data(filename, type_map):
        # filename: path to LAMMPS data file
        # type_map: list of element symbols corresponding to atom types (1-indexed)
        # Read LAMMPS data file and convert to ASE Atoms object
        # Returns: atoms (sorted by LAMMPS ID), id_to_index mapping
        from ase import Atoms

        with open(filename, 'r') as f:
                lines = f.readlines()

        # Parse header information
        natoms = None
        for i, line in enumerate(lines):
                if 'atoms' in line:
                        natoms = int(line.split()[0])
                elif 'xlo xhi' in line:
                        xlo, xhi = map(float, line.split()[:2])
                        box_x = xhi - xlo
                elif 'ylo yhi' in line:
                        ylo, yhi = map(float, line.split()[:2])
                        box_y = yhi - ylo
                elif 'zlo zhi' in line:
                        zlo, zhi = map(float, line.split()[:2])
                        box_z = zhi - zlo
                elif 'Atoms' in line:
                        atom_start = i + 2
                        break

        # Parse atomic coordinates
        atom_data = []
        for i in range(atom_start, atom_start + natoms):
                parts = lines[i].split()
                atom_id = int(parts[0])
                atom_type = int(parts[1])
                x, y, z = map(float, parts[2:5])

                atom_data.append({
                        'id': atom_id,
                        'type': atom_type,
                        'position': [x, y, z],
                        'symbol': type_map[atom_type - 1]
                })

        # Sort atoms by ID
        atom_data.sort(key=lambda x: x['id'])

        # Extract sorted positions and symbols
        positions = [atom['position'] for atom in atom_data]
        symbols = [atom['symbol'] for atom in atom_data]

        # Create mapping from LAMMPS ID to ASE index
        id_to_index = {atom['id']: i for i, atom in enumerate(atom_data)}

        # Create ASE Atoms object
        atoms = Atoms(symbols=symbols, positions=positions)
        atoms.set_cell([box_x, box_y, box_z])
        atoms.set_pbc([False, False, False])

        return atoms, id_to_index

def generate_initial_displacement(atoms, displacement_magnitude=0.1, mask_mode='all',
                                # atoms: ASE Atoms object
                                # displacement_magnitude: magnitude of displacement in Å
                                # mask_mode: which atoms can be optimized ('all', 'reactive', 'displaced')
                                displacement_mode='smart', max_displaced_atoms=None,
                                # displacement_mode: how to select atoms for displacement ('smart', 'specified_pair', etc.)
                                # max_displaced_atoms: maximum number of atoms to displace (None = no limit)
                                specified_atom_pairs=None, random_method='bounded_magnitude',
                                # specified_atom_pairs: list of atom indices to displace (for 'specified_pair' mode)
                                # random_method: random displacement method ('bounded_magnitude' or 'fixed')
                                min_displacement_ratio=0.3):
                                # min_displacement_ratio: minimum displacement as fraction of displacement_magnitude
        # Generate initial displacement vector for dimer method
        n_atoms = len(atoms)
        displacement_vector = np.zeros((n_atoms, 3))
        symbols = atoms.get_chemical_symbols()

        # Define reactive elements
        reactive_elements = ['C', 'N', 'O', 'S', 'P', 'F', 'Cl', 'Br']

        # Determine which atoms to displace initially
        if displacement_mode == 'specified_pair':
                if specified_atom_pairs is None or len(specified_atom_pairs) == 0:
                        raise ValueError("specified_atom_pairs must be provided when using 'specified_pair' mode")
                atoms_to_displace = list(specified_atom_pairs)
                actual_displacement = displacement_magnitude
        else:
                # Default to specified_pair mode with reactive atoms
                atoms_to_displace = [i for i, symbol in enumerate(symbols) if symbol in reactive_elements]
                actual_displacement = displacement_magnitude

        # Apply initial displacement
        def generate_random_displacement(max_magnitude, min_magnitude, method='bounded_magnitude'):
                # Generate controlled random displacement vector
                if method == 'bounded_magnitude':
                        direction = np.random.normal(0, 1, 3)
                        direction = direction / np.linalg.norm(direction)
                        magnitude = np.random.uniform(min_magnitude, max_magnitude)
                        return direction * magnitude
                else:
                        # Fixed magnitude
                        direction = np.random.normal(0, 1, 3)
                        direction = direction / np.linalg.norm(direction)
                        return direction * max_magnitude

        min_magnitude = actual_displacement * min_displacement_ratio
        for atom_idx in atoms_to_displace:
                displacement_vector[atom_idx] = generate_random_displacement(
                        actual_displacement, min_magnitude, random_method
                )

        # Create mask for optimization
        if mask_mode == 'all':
                mask = [True] * n_atoms
        elif mask_mode == 'reactive':
                mask = [symbols[i] in reactive_elements for i in range(n_atoms)]
        elif mask_mode == 'displaced':
                mask = [np.linalg.norm(displacement_vector[i]) > 0 for i in range(n_atoms)]
        else:
                mask = [True] * n_atoms

        return displacement_vector.tolist(), mask

def run_dimer_for_structure(atoms, calc, displacement_vector, mask, type_map,
                          output_prefix="dimer_ts", fmax=0.02, max_steps=2000,
                          # output_prefix: prefix for output files (trajectory, log, etc.)
                          # fmax: force convergence criterion in eV/Å
                          # max_steps: maximum number of optimization steps
                          f_rot_min=0.1, f_rot_max=0.5, max_num_rot=6,
                          # f_rot_min/max: min/max rotational force threshold for dimer rotation
                          # max_num_rot: max rotation iterations per translation step
                          trial_angle=0.349066, trial_trans_step=0.001,
                          # trial_angle: rotation angle for dimer axis in radians (default ~20deg)
                          # trial_trans_step: initial step size for CG translation
                          maximum_translation=0.1, dimer_separation=0.0003,
                          # maximum_translation: max step size for translation in Å
                          # dimer_separation: distance between dimer images in Å (affects curvature accuracy)
                          extrapolate_forces=True, use_central_forces=False,
                          # extrapolate_forces: use force extrapolation for efficiency
                          # use_central_forces: use central difference for force calculation
                          # Adaptive strategy parameters
                          use_adaptive_strategy=False,
                          # use_adaptive_strategy: enable 2-phase optimization (coarse->fine)
                          adaptive_force_threshold=None,
                          # adaptive_force_threshold: force threshold for phase switching (default: 2*fmax)
                          adaptive_consecutive_steps=2,
                          # adaptive_consecutive_steps: consecutive steps meeting criteria before phase switch
                          phase2_trial_angle=None,
                          # phase2_trial_angle: rotation angle for phase 2 (default: trial_angle/2)
                          phase2_dimer_separation=None,
                          # phase2_dimer_separation: dimer separation for phase 2 (default: dimer_separation/2)
                          phase2_cg_translation=False,
                          # phase2_cg_translation: use CG translation in phase 2 (False = use quickmin)
                          phase2_f_rot_max=None,
                          # phase2_f_rot_max: max rotational force for phase 2 (default: min(f_rot_max/2, 0.1))
                          phase2_displacement_magnitude=None):
                          # phase2_displacement_magnitude: eigenmode displacement for phase 2 (default: maximum_translation)
        # Run dimer calculation for a single structure with optional 2-phase adaptive strategy
        # Returns trajectory file path and convergence info
        from ase.dimer import DimerControl, MinModeAtoms, MinModeTranslate
        from ase.io import write

        # Set calculator
        atoms.calc = calc

        # Get initial energy
        initial_energy = atoms.get_potential_energy()

        # Set up log files
        log_file = f"{output_prefix}.log"  # Simplified naming: opt_*_dp_ts.log
        traj_file = f".{output_prefix}_internal.traj"  # Internal ASE trajectory file (hidden with .)

        # Use custom log file handler
        custom_log = DimerLogFile(log_file)

        print(f"\nDimer calculation for {output_prefix}")
        print(f"Initial energy: {initial_energy:.6f} eV")
        print(f"\nDimer parameters:")
        print(f"  Displacement magnitude: {np.linalg.norm(displacement_vector):.3f} A")
        print(f"  f_rot_min: {f_rot_min}")
        print(f"  f_rot_max: {f_rot_max}")
        print(f"  max_num_rot: {max_num_rot}")
        print(f"  trial_angle: {trial_angle:.4f} rad ({np.degrees(trial_angle):.1f}deg)")
        print(f"  trial_trans_step: {trial_trans_step}")
        print(f"  maximum_translation: {maximum_translation}")
        print(f"  dimer_separation: {dimer_separation}")
        print(f"  extrapolate_forces: {extrapolate_forces}")
        print(f"  use_central_forces: {use_central_forces}")

        # Set up adaptive strategy parameters
        if use_adaptive_strategy:
                if adaptive_force_threshold is None:
                        adaptive_force_threshold = 2.0 * fmax
                if phase2_trial_angle is None:
                        phase2_trial_angle = trial_angle / 2.0
                if phase2_dimer_separation is None:
                        phase2_dimer_separation = dimer_separation / 2.0
                if phase2_f_rot_max is None:
                        phase2_f_rot_max = min(f_rot_max / 2.0, 0.1)
                if phase2_displacement_magnitude is None:
                        phase2_displacement_magnitude = maximum_translation

                print(f"\nAdaptive Strategy Enabled:")
                print(f"  Phase 1 (Coarse search):")
                print(f"    - trial_angle: {np.degrees(trial_angle):.1f}deg")
                print(f"    - dimer_separation: {dimer_separation:.4f}")
                print(f"    - cg_translation: True")
                print(f"    - f_rot_max: {f_rot_max}")
                print(f"  Phase 2 (Fine search, when max_force < {adaptive_force_threshold:.3f} and curvature > 0 for {adaptive_consecutive_steps} consecutive steps):")
                print(f"    - trial_angle: {np.degrees(phase2_trial_angle):.1f}deg")
                print(f"    - dimer_separation: {phase2_dimer_separation:.4f}")
                print(f"    - cg_translation: {phase2_cg_translation}")
                print(f"    - f_rot_max: {phase2_f_rot_max}")
                print(f"    - displacement_magnitude: {phase2_displacement_magnitude:.4f}")

        # Initialize trajectory writers
        xyz_traj_file = f"{output_prefix}.xyz"  # Main trajectory: opt_*_dp_ts.xyz
        dump_traj_file = f"{output_prefix}.dump"  # LAMMPS trajectory: opt_*_dp_ts.dump

        print(f"\nStarting Dimer optimization...")
        print(f"Trajectory file: {xyz_traj_file}")
        print(f"Log file: {log_file}")
        print(f"Force convergence: {fmax} eV/Angstrom")
        print(f"Max steps: {max_steps}")
        step_counter = [0]  # Simple counter for trajectory file naming
        phase_switched = [False]  # Track if we've switched to phase 2

        # Clear trajectory files
        with open(xyz_traj_file, 'w') as f:
                pass
        with open(dump_traj_file, 'w') as f:
                pass

        def trajectory_observer(atoms_obj):
                # Save current structure to LAMMPS dump format
                step_counter[0] += 1

                # Write to LAMMPS dump format (no extra energy calculation)
                with open(dump_traj_file, 'a') as f:
                        f.write(f"ITEM: TIMESTEP\n")
                        f.write(f"{step_counter[0]}\n")
                        f.write(f"ITEM: NUMBER OF ATOMS\n")
                        f.write(f"{len(atoms_obj)}\n")

                        # Get box dimensions
                        cell = atoms_obj.get_cell()
                        f.write(f"ITEM: BOX BOUNDS pp pp pp\n")
                        f.write(f"0.0 {cell[0, 0]:.6f}\n")
                        f.write(f"0.0 {cell[1, 1]:.6f}\n")
                        f.write(f"0.0 {cell[2, 2]:.6f}\n")

                        # Write atoms with properties (no extra calculations)
                        f.write(f"ITEM: ATOMS id type x y z\n")
                        symbols = atoms_obj.get_chemical_symbols()
                        positions = atoms_obj.get_positions()
                        # Create element to type mapping
                        unique_elements = list(dict.fromkeys(symbols))
                        element_to_type = {elem: i+1 for i, elem in enumerate(unique_elements)}

                        for i in range(len(atoms_obj)):
                                pos = positions[i]
                                elem = symbols[i]
                                atom_type = element_to_type[elem]
                                f.write(f"{i+1} {atom_type} {pos[0]:.6f} {pos[1]:.6f} {pos[2]:.6f}\n")

                # Also write to XYZ for compatibility (no energy calculation)
                with open(xyz_traj_file, 'a') as f:
                        f.write(f"{len(atoms_obj)}\n")
                        f.write(f"Dimer step {step_counter[0]} - Energy: {atoms_obj.get_potential_energy():.6f} eV\n")
                        symbols = atoms_obj.get_chemical_symbols()
                        positions = atoms_obj.get_positions()
                        for i in range(len(atoms_obj)):
                                pos = positions[i]
                                elem = symbols[i]
                                f.write(f"{elem} {pos[0]:.6f} {pos[1]:.6f} {pos[2]:.6f}\n")

        # Implement adaptive two-phase optimization strategy
        # Keep track of optimizer references for step counting
        final_optimizer = None

        try:
                if use_adaptive_strategy:
                        # Phase 1: Coarse search with large parameters and cg_translation=True
                        print("\n=== PHASE 1: Coarse Search ===")
                        current_trial_angle = trial_angle
                        current_dimer_separation = dimer_separation
                        current_cg_translation = True  # Use CG in phase 1
                        current_f_rot_max = f_rot_max
                        phase = 1

                        # Set up initial dimer configuration
                        with DimerControl(initial_eigenmode_method='displacement',
                                          displacement_method='vector',
                                          logfile=custom_log,
                                          mask=mask,
                                          f_rot_min=f_rot_min,
                                          f_rot_max=current_f_rot_max,
                                          max_num_rot=max_num_rot,
                                          trial_angle=current_trial_angle,
                                          trial_trans_step=trial_trans_step,
                                          maximum_translation=maximum_translation,
                                          dimer_separation=current_dimer_separation,
                                          extrapolate_forces=extrapolate_forces,
                                          use_central_forces=use_central_forces,
                                          cg_translation=current_cg_translation,
                                          order=1) as d_control:

                                d_atoms = MinModeAtoms(atoms, d_control)
                                d_atoms.displace(displacement_vector=displacement_vector)

                                # Custom convergence check for phase switching
                                class AdaptiveOptimizer:
                                        def __init__(self, atoms, force_threshold, fmax, required_consecutive_steps):
                                                self.atoms = atoms
                                                self.force_threshold = force_threshold
                                                self.fmax = fmax
                                                self.switch_to_phase2 = False
                                                self.final_phase1_atoms = None
                                                # Track consecutive satisfactions for phase switch
                                                self.consecutive_satisfactions = 0
                                                self.required_consecutive = required_consecutive_steps

                                        def check_phase_switch(self):
                                                # Check if we should switch to phase 2
                                                forces = self.atoms.get_forces()
                                                max_force = np.max(np.linalg.norm(forces, axis=1))

                                                # Get curvature from dimer control
                                                if hasattr(self.atoms, 'get_curvature'):
                                                        curvature = self.atoms.get_curvature()
                                                else:
                                                        curvature = 0.0  # Default if not available

                                                # Check if current step satisfies conditions
                                                current_satisfies = (max_force < self.force_threshold and curvature > 0)

                                                if current_satisfies:
                                                        self.consecutive_satisfactions += 1
                                                        print(f"  Phase switch condition check {self.consecutive_satisfactions}/{self.required_consecutive}:")
                                                        print(f"    Max force: {max_force:.4f} < {self.force_threshold:.4f} [OK]")
                                                        print(f"    Curvature: {curvature:.4f} > 0 [OK]")

                                                        # Switch only after required consecutive satisfactions
                                                        if self.consecutive_satisfactions >= self.required_consecutive:
                                                                self.switch_to_phase2 = True
                                                                self.final_phase1_atoms = self.atoms.atoms.copy()
                                                                print(f"\n=== Phase switch conditions met for {self.required_consecutive} consecutive steps! ===")
                                                                print(f"  Final max force: {max_force:.4f} < {self.force_threshold:.4f}")
                                                                print(f"  Final curvature: {curvature:.4f} > 0")
                                                                print_dimer_info(self.atoms, "Dimer state at phase switch")
                                                                return True
                                                else:
                                                        # Reset counter if condition not satisfied
                                                        if self.consecutive_satisfactions > 0:
                                                                print(f"  Phase switch condition broken (resetting counter from {self.consecutive_satisfactions}):")
                                                                print(f"    Max force: {max_force:.4f} {'<' if max_force < self.force_threshold else '>='} {self.force_threshold:.4f}")
                                                                print(f"    Curvature: {curvature:.4f} {'>' if curvature > 0 else '<='} 0")
                                                        self.consecutive_satisfactions = 0

                                                return False

                                adaptive_opt = AdaptiveOptimizer(d_atoms, adaptive_force_threshold, fmax, adaptive_consecutive_steps)

                                # Run phase 1 with monitoring
                                with MinModeTranslate(d_atoms, trajectory=traj_file, logfile=custom_log) as dim_rlx:
                                        # Custom convergence criteria that includes phase switching
                                        def custom_converged(forces=None):
                                                # Check convergence or phase switch
                                                if forces is None:
                                                        forces = d_atoms.get_forces()
                                                max_force = np.max(np.linalg.norm(forces, axis=1))

                                                # Check standard convergence
                                                if max_force < fmax:
                                                        return True

                                                # Check phase switch condition
                                                if adaptive_opt.check_phase_switch():
                                                        return True

                                                return False

                                        # Check initial forces
                                        initial_forces = d_atoms.get_forces()
                                        max_initial_force = np.max(np.linalg.norm(initial_forces, axis=1))
                                        print(f"\nInitial max force: {max_initial_force:.4f} eV/A")
                                        print(f"Force convergence criterion: {fmax:.4f} eV/A")
                                        print(f"Phase switch threshold: {adaptive_force_threshold:.4f} eV/A (requires {adaptive_consecutive_steps} consecutive steps)")

                                        if max_initial_force < fmax:
                                                print("WARNING: Initial structure already meets convergence criterion!")

                                        # Attach trajectory observer
                                        dim_rlx.attach(lambda: trajectory_observer(d_atoms), interval=1)

                                        # Run phase 1 - let ASE handle the optimization normally
                                        # The dimer optimizer will handle all internal rotation/translation steps

                                        # Custom convergence function that allows phase switching
                                        original_converged = dim_rlx.converged

                                        def custom_converged_wrapper():
                                                # First check if we should switch phases
                                                if adaptive_opt.check_phase_switch():
                                                        return True  # Stop phase 1 to switch to phase 2
                                                # Otherwise use normal convergence check
                                                return original_converged()

                                        # Replace the converged method
                                        dim_rlx.converged = custom_converged_wrapper

                                        # Run optimization normally
                                        dim_rlx.run(fmax=fmax, steps=max_steps)

                                        # Save optimizer reference
                                        final_optimizer = dim_rlx

                                        phase1_steps = getattr(dim_rlx, 'nsteps', step_counter[0])
                                        phase1_energy = d_atoms.get_potential_energy()

                                        print(f"\nPhase 1 completed after {phase1_steps} optimization steps")

                                # Check if we should switch to phase 2
                                if adaptive_opt.switch_to_phase2 and phase1_steps < max_steps:
                                        phase_switched[0] = True
                                        print("\n=== PHASE 2: Fine Search ===")
                                        print(f"Switching to fine parameters after {phase1_steps} steps")

                                        # Report parameter changes
                                        print(f"  Parameter changes:")
                                        print(f"    - trial_angle: {np.degrees(trial_angle):.1f}deg -> {np.degrees(phase2_trial_angle):.1f}deg")
                                        print(f"    - dimer_separation: {dimer_separation:.4f} -> {phase2_dimer_separation:.4f}")
                                        print(f"    - f_rot_max: {f_rot_max} -> {phase2_f_rot_max}")
                                        print(f"    - cg_translation: True -> {phase2_cg_translation}")
                                        print(f"    - displacement_magnitude: {np.linalg.norm(displacement_vector):.4f} -> {phase2_displacement_magnitude:.4f}")

                                        # Create new dimer with Phase 2 parameters (full re-initialization)
                                        print("  Creating new dimer with Phase 2 parameters...")
                                        print("  (Full re-initialization to ensure parameters take effect)")

                                        # Create new DimerControl with phase 2 parameters
                                        d_control2 = DimerControl(
                                                initial_eigenmode_method='displacement',
                                                displacement_method='vector',
                                                logfile=custom_log,
                                                mask=mask,
                                                f_rot_min=f_rot_min,
                                                f_rot_max=phase2_f_rot_max,
                                                max_num_rot=max_num_rot,
                                                trial_angle=phase2_trial_angle,
                                                trial_trans_step=trial_trans_step,
                                                maximum_translation=maximum_translation,
                                                dimer_separation=phase2_dimer_separation,
                                                extrapolate_forces=extrapolate_forces,
                                                use_central_forces=use_central_forces,
                                                cg_translation=phase2_cg_translation,
                                                order=1
                                        )

                                        # Get the current atoms positions from phase 1
                                        phase2_atoms = d_atoms.atoms.copy()
                                        if not hasattr(phase2_atoms, 'calc') or phase2_atoms.calc is None:
                                                phase2_atoms.calc = calc

                                        # Create new MinModeAtoms
                                        d_atoms2 = MinModeAtoms(phase2_atoms, d_control2)

                                        # Get eigenmode from phase 1 to preserve optimization direction
                                        eigenmode_from_phase1 = None
                                        if hasattr(d_atoms, 'get_eigenmode'):
                                                try:
                                                        eigenmode_from_phase1 = d_atoms.get_eigenmode()
                                                        print(f"  Preserved eigenmode from Phase 1 (norm: {np.linalg.norm(eigenmode_from_phase1):.4f})")
                                                except:
                                                        print("  Could not retrieve eigenmode from Phase 1")

                                        # Apply eigenmode as displacement with user-specified magnitude
                                        if eigenmode_from_phase1 is not None:
                                                # Use eigenmode direction with user-specified displacement magnitude
                                                # This allows user control over Phase 2 displacement size
                                                eigenmode_norm = np.linalg.norm(eigenmode_from_phase1)
                                                if eigenmode_norm > 0:
                                                        # Scale eigenmode to have the desired magnitude
                                                        scaled_eigenmode = eigenmode_from_phase1 * (phase2_displacement_magnitude / eigenmode_norm)
                                                        d_atoms2.displace(displacement_vector=scaled_eigenmode)
                                                        print(f"  Applied eigenmode with {phase2_displacement_magnitude:.3f} A displacement magnitude")
                                                        print(f"  (User-specified phase2_displacement_magnitude)")
                                                        print(f"  (Note: dimer_separation={phase2_dimer_separation:.4f} is for precision, not displacement size)")
                                        else:
                                                # Fall back to scaled original displacement if eigenmode not available
                                                # Use user-specified displacement magnitude as reference for scaling
                                                scale_factor = phase2_displacement_magnitude / np.linalg.norm(displacement_vector)
                                                scaled_displacement = displacement_vector * scale_factor
                                                d_atoms2.displace(displacement_vector=scaled_displacement)
                                                print(f"  Applied scaled original displacement using phase2_displacement_magnitude")
                                                print(f"  Original magnitude: {np.linalg.norm(displacement_vector):.3f} A, Phase 2: {phase2_displacement_magnitude:.3f} A")

                                        # Create new optimizer for phase 2
                                        dim_rlx2 = MinModeTranslate(d_atoms2, trajectory=traj_file, logfile=custom_log)
                                        dim_rlx2.attach(lambda: trajectory_observer(d_atoms2), interval=1)

                                        # Run phase 2 optimization
                                        remaining_steps = max_steps - phase1_steps
                                        print(f"  Starting Phase 2 optimization (max {remaining_steps} steps)...")

                                        # Let ASE handle the optimization with proper convergence checking
                                        dim_rlx2.run(fmax=fmax, steps=remaining_steps)

                                        # Update references
                                        d_atoms = d_atoms2
                                        final_optimizer = dim_rlx2

                                        # Get phase 2 step count
                                        phase2_steps = getattr(dim_rlx2, 'nsteps', 0)
                                        print(f"\nPhase 2 completed after {phase2_steps} optimization steps")

                                        # Check final status
                                        forces = d_atoms.get_forces()
                                        max_force = np.max(np.linalg.norm(forces, axis=1))

                                        # Get final curvature
                                        final_curvature = 0.0
                                        if hasattr(d_atoms, 'get_curvature'):
                                                try:
                                                        final_curvature = d_atoms.get_curvature()
                                                except:
                                                        pass

                                        # Report phase 2 results
                                        if max_force < fmax and final_curvature < 0:
                                                print(f"  Phase 2 Status: Converged to transition state [OK]")
                                                print(f"    Max force: {max_force:.4f} < {fmax:.4f} eV/A [OK]")
                                                print(f"    Curvature: {final_curvature:.4f} < 0 [OK]")
                                        elif max_force < fmax and final_curvature >= 0:
                                                print(f"  Phase 2 Status: Force converged but NOT a transition state")
                                                print(f"    Max force: {max_force:.4f} < {fmax:.4f} eV/A [OK]")
                                                print(f"    Curvature: {final_curvature:.4f} >= 0 [X]")
                                        elif phase2_steps >= remaining_steps:
                                                print(f"  Phase 2 Status: Reached step limit ({remaining_steps} steps)")
                                                print(f"    Final max force: {max_force:.4f} eV/A")
                                                print(f"    Final curvature: {final_curvature:.4f}")
                                        else:
                                                print(f"  Phase 2 Status: Stopped")
                                                print(f"    Final max force: {max_force:.4f} eV/A")
                                                print(f"    Final curvature: {final_curvature:.4f}")

                else:
                        # Standard single-phase optimization
                        with DimerControl(initial_eigenmode_method='displacement',
                                          displacement_method='vector',
                                          logfile=custom_log,
                                          mask=mask,
                                          f_rot_min=f_rot_min,
                                          f_rot_max=f_rot_max,
                                          max_num_rot=max_num_rot,
                                          trial_angle=trial_angle,
                                          trial_trans_step=trial_trans_step,
                                          maximum_translation=maximum_translation,
                                          dimer_separation=dimer_separation,
                                          extrapolate_forces=extrapolate_forces,
                                          use_central_forces=use_central_forces,
                                          cg_translation=False,
                                          order=1) as d_control:

                                d_atoms = MinModeAtoms(atoms, d_control)
                                d_atoms.displace(displacement_vector=displacement_vector)

                                with MinModeTranslate(d_atoms, trajectory=traj_file, logfile=custom_log) as dim_rlx:
                                        # Check initial forces
                                        initial_forces = d_atoms.get_forces()
                                        max_initial_force = np.max(np.linalg.norm(initial_forces, axis=1))
                                        print(f"\nInitial max force: {max_initial_force:.4f} eV/A")
                                        print(f"Force convergence criterion: {fmax:.4f} eV/A")

                                        if max_initial_force < fmax:
                                                print("WARNING: Initial structure already meets convergence criterion!")
                                                print("This might indicate:")
                                                print("  1. The structure is already at or near a stationary point")
                                                print("  2. The force convergence criterion (fmax) is too loose")
                                                print("  3. Consider tightening fmax or using a different initial structure")

                                        dim_rlx.attach(lambda: trajectory_observer(d_atoms), interval=1)
                                        dim_rlx.run(fmax=fmax, steps=max_steps)

                                        # Save optimizer reference
                                        final_optimizer = dim_rlx

                # Get final structure (use d_atoms directly to avoid extra copy)
                final_energy = d_atoms.get_potential_energy()

                print(f"\nOptimization completed!")
                print(f"Final energy: {final_energy:.6f} eV")
                print(f"Energy change: {final_energy - initial_energy:.6f} eV")

                # Get actual step count
                actual_steps = step_counter[0]

                # Try to get the real step count from the optimizer
                if final_optimizer is not None:
                        # MinModeTranslate might store steps in different attributes
                        if hasattr(final_optimizer, 'nsteps'):
                                actual_steps = final_optimizer.nsteps
                        elif hasattr(final_optimizer, 'step'):
                                actual_steps = final_optimizer.step
                        elif hasattr(final_optimizer, 'niter'):
                                actual_steps = final_optimizer.niter

                # If we still don't have the count, use trajectory observer count
                if actual_steps == 0:
                        actual_steps = step_counter[0]

                # Calculate total steps correctly for adaptive strategy
                if use_adaptive_strategy and phase_switched[0]:
                        # For adaptive strategy, we need to add phase1 and phase2 steps
                        if 'phase2_steps' in locals():
                                total_steps = phase1_steps + phase2_steps
                        else:
                                total_steps = actual_steps
                        print(f"Total optimization steps: {total_steps}")
                        print(f"  Phase 1 steps: {phase1_steps}")
                        print(f"  Phase 2 steps: {phase2_steps if 'phase2_steps' in locals() else 0}")
                        print("  Strategy: Adaptive two-phase optimization")
                else:
                        print(f"Total optimization steps: {actual_steps}")

                # Output summary - trajectories are already saved by observer
                print(f"Trajectory log: {log_file}")
                print(f"Trajectory XYZ: {xyz_traj_file}")
                print(f"Trajectory dump: {dump_traj_file}")

                # Analyze the optimization
                print(f"\nOptimization Analysis:")

                # Check final forces and curvature to determine convergence
                final_forces = d_atoms.get_forces()
                final_max_force = np.max(np.linalg.norm(final_forces, axis=1))

                # Get final curvature
                final_curvature = 0.0
                if hasattr(d_atoms, 'get_curvature'):
                        try:
                                final_curvature = d_atoms.get_curvature()
                        except:
                                pass

                # Transition state requires both force convergence AND negative curvature
                if final_max_force < fmax and final_curvature < 0:
                        print(f"  Status: Converged to transition state [OK]")
                        print(f"    Max force: {final_max_force:.4f} < {fmax:.4f} eV/A [OK]")
                        print(f"    Curvature: {final_curvature:.4f} < 0 [OK]")
                elif final_max_force < fmax and final_curvature >= 0:
                        print(f"  Status: Force converged but NOT a transition state [X]")
                        print(f"    Max force: {final_max_force:.4f} < {fmax:.4f} eV/A [OK]")
                        print(f"    Curvature: {final_curvature:.4f} >= 0 [X]")
                        print("  Note: Structure may be at a minimum or higher-order saddle point")
                elif actual_steps >= max_steps:
                        print(f"  Status: Reached step limit ({max_steps} steps) [X]")
                        print(f"    Final max force: {final_max_force:.4f} eV/A")
                        print(f"    Final curvature: {final_curvature:.4f}")
                else:
                        print(f"  Status: Optimization stopped [X]")
                        print(f"    Final max force: {final_max_force:.4f} eV/A")
                        print(f"    Final curvature: {final_curvature:.4f}")

                # Close log file
                custom_log.close()

                # Clean up internal trajectory file
                try:
                        import os
                        if os.path.exists(traj_file):
                                os.remove(traj_file)
                except:
                        pass  # Ignore cleanup errors

                # Return results
                converged = final_max_force < fmax
                return {
                        'trajectory': xyz_traj_file,  # Main trajectory file: opt_*_dp_ts.xyz
                        'converged': converged,
                        'nsteps': actual_steps,
                        'max_force': final_max_force,
                        'curvature': final_curvature,
                        'is_transition_state': converged and final_curvature < 0
                }

        except Exception as e:
                print(f"  Error in dimer calculation: {e}")
                import traceback
                traceback.print_exc()
                return None


# Helper function for parallel dimer calculations
def run_single_dimer_parallel(args):
        # Unpacks arguments and runs dimer calculation for multiprocessing
        (input_file, changed_atoms, calc_params, dimer_params) = args

        # Unpack parameters
        type_map_list = calc_params['type_map_list']
        model_file = calc_params['model_file']
        use_server = calc_params['use_server']

        # Create calculator inside the worker process
        # This avoids pickle serialization issues with DeepMDClient
        if use_server:
                try:
                        from ase.calculators.calculator import Calculator
                        # Import DeepMD client inside the worker
                        import sys
                        server_client_dir = calc_params.get('server_client_dir', '/opt')
                        if server_client_dir not in sys.path:
                                sys.path.insert(0, server_client_dir)
                        from deepmd_client import create_multi_server_client
                        num_servers = calc_params.get('num_servers', 4)
                        base_port = calc_params.get('base_port', 50001)
                        print(f"Worker using DeepMD multi-server client from {server_client_dir} on ports {base_port}-{base_port + num_servers - 1}")
                        calc = create_multi_server_client(num_servers=num_servers, base_port=base_port)
                except Exception as e:
                        print(f"Failed to create DeepMD multi-server client in worker: {e}")
                        return None
        else:
                # Legacy direct model path; current LAMMPS registration does not expose use_server=False.
                calc = get_deepmd_model(model_file, use_server=False)

        # Extract base name
        base_name = os.path.basename(input_file).replace('.lmp', '')
        output_base = base_name + "_dp_ts"

        try:
                # Read structure
                atoms, id_to_index = read_lammps_data(input_file, type_map_list)

                # Generate initial displacement
                displacement_vector, mask = generate_initial_displacement(
                        atoms,
                        displacement_magnitude=dimer_params['displacement_magnitude'],
                        mask_mode=dimer_params['mask_mode'],
                        displacement_mode=dimer_params['displacement_mode'],
                        max_displaced_atoms=dimer_params['max_displaced_atoms'],
                        specified_atom_pairs=changed_atoms,
                        random_method=dimer_params['random_method'],
                        min_displacement_ratio=dimer_params['min_displacement_ratio']
                )

                # Run dimer calculation
                result = run_dimer_for_structure(
                        atoms, calc, displacement_vector, mask, type_map_list,
                        output_prefix=output_base,
                        fmax=dimer_params['fmax'],
                        max_steps=dimer_params['max_steps'],
                        f_rot_min=dimer_params['f_rot_min'],
                        f_rot_max=dimer_params['f_rot_max'],
                        max_num_rot=dimer_params['max_num_rot'],
                        trial_angle=dimer_params['trial_angle'],
                        trial_trans_step=dimer_params['trial_trans_step'],
                        maximum_translation=dimer_params['maximum_translation'],
                        dimer_separation=dimer_params['dimer_separation'],
                        extrapolate_forces=dimer_params['extrapolate_forces'],
                        use_central_forces=dimer_params['use_central_forces'],
                        use_adaptive_strategy=dimer_params['use_adaptive_strategy'],
                        adaptive_force_threshold=dimer_params['adaptive_force_threshold'],
                        adaptive_consecutive_steps=dimer_params['adaptive_consecutive_steps'],
                        phase2_trial_angle=dimer_params['phase2_trial_angle'],
                        phase2_dimer_separation=dimer_params['phase2_dimer_separation'],
                        phase2_cg_translation=dimer_params['phase2_cg_translation'],
                        phase2_f_rot_max=dimer_params['phase2_f_rot_max'],
                        phase2_displacement_magnitude=dimer_params['phase2_displacement_magnitude']
                )

                if result:
                        result['input'] = input_file
                        result['output_base'] = output_base
                        return result

        except Exception as e:
                print(f"  Error in dimer calculation for {input_file}: {e}")
                import traceback
                traceback.print_exc()
                return None


# Dimer batch processing function for LAMMPS integration
def run_dimer_batch_for_lammps(model_file="model.000.pth",
                              # model_file: DeepMD model file path
                              type_map="H,C,N,O,F,P,S,Cl",
                              # type_map: comma-separated list of element symbols
                              input_wildcard="opt_startpoint_*.lmp",
                              # input_wildcard: pattern to match input LAMMPS data files
                              bond_changes_mapping_file="bond_changes_mapping.json",
                              # bond_changes_mapping_file: JSON file containing bond change info from snapshots_from_traj
                              # Dimer parameters
                              displacement_magnitude=0.08,
                              # displacement_magnitude: initial displacement magnitude in Å
                              fmax=0.02,
                              # fmax: force convergence criterion in eV/Å
                              max_steps=2000,
                              # max_steps: maximum optimization steps per structure
                              mask_mode='all',
                              # mask_mode: which atoms to optimize ('all', 'reactive', 'displaced')
                              displacement_mode='specified_pair',
                              # displacement_mode: how to select atoms for initial displacement
                              max_displaced_atoms=None,
                              # max_displaced_atoms: limit number of displaced atoms (None = no limit)
                              # Dimer-specific parameters
                              f_rot_min=0.1,
                              # f_rot_min: minimum rotational force threshold
                              f_rot_max=0.5,
                              # f_rot_max: maximum rotational force threshold
                              max_num_rot=6,
                              # max_num_rot: max rotation iterations per translation step
                              trial_angle=0.349066,  # math.pi/9.0
                              # trial_angle: rotation angle in radians (~20deg)
                              trial_trans_step=0.001,
                              # trial_trans_step: initial CG translation step size
                              maximum_translation=0.1,
                              # maximum_translation: max translation step in Å
                              dimer_separation=0.0003,
                              # dimer_separation: distance between dimer images in Å
                              extrapolate_forces="True",
                              # extrapolate_forces: use force extrapolation
                              use_central_forces="False",
                              # use_central_forces: use central difference for forces
                              # Adaptive strategy parameters
                              use_adaptive_strategy="False",
                              # use_adaptive_strategy: enable 2-phase optimization
                              adaptive_force_threshold=None,
                              # adaptive_force_threshold: phase switch force threshold (default: 2*fmax)
                              adaptive_consecutive_steps=2,
                              # adaptive_consecutive_steps: consecutive steps before phase switch
                              phase2_trial_angle=None,
                              # phase2_trial_angle: phase 2 rotation angle (default: trial_angle/2)
                              phase2_dimer_separation=None,
                              # phase2_dimer_separation: phase 2 separation (default: dimer_separation/2)
                              phase2_cg_translation="False",
                              # phase2_cg_translation: use CG in phase 2
                              phase2_f_rot_max=None,
                              # phase2_f_rot_max: phase 2 max rotation force (default: min(f_rot_max/2, 0.1))
                              phase2_displacement_magnitude=None,
                              # phase2_displacement_magnitude: phase 2 displacement (default: maximum_translation)
                              # Random displacement parameters
                              random_method='bounded_magnitude',
                              # random_method: method for random displacement ('bounded_magnitude' or 'fixed')
                              min_displacement_ratio=0.3,
                              # min_displacement_ratio: minimum displacement as ratio of displacement_magnitude
                              # Parallel processing
                              num_processes=1,
                              # num_processes: number of parallel processes for batch calculations
                              num_servers=4):
                              # num_servers: number of DeepMD servers for load balancing
                              # num_processes: number of parallel processes for batch calculations
        # Run dimer calculations on all structures matching input_wildcard pattern.
        # This replaces the Gaussian-based transition state search functionality.
        # Output files maintain the same naming convention as Gaussian outputs.
        #
        # Now reads bond change information from a JSON file generated by snapshots_from_traj,
        # avoiding redundant calculations.
        #
        # Supports 2-phase adaptive strategy for improved transition state optimization:
        # - Phase 1: Coarse search with larger parameters and CG translation
        # - Phase 2: Fine search with reduced parameters when approaching convergence

        # Convert string parameters to boolean (LAMMPS passes "True"/"False" as strings)
        extrapolate_forces = extrapolate_forces.lower() == "true" if isinstance(extrapolate_forces, str) else extrapolate_forces
        use_central_forces = use_central_forces.lower() == "true" if isinstance(use_central_forces, str) else use_central_forces
        use_adaptive_strategy = use_adaptive_strategy.lower() == "true" if isinstance(use_adaptive_strategy, str) else use_adaptive_strategy
        phase2_cg_translation = phase2_cg_translation.lower() == "true" if isinstance(phase2_cg_translation, str) else phase2_cg_translation

        import glob
        import re
        from concurrent.futures import ProcessPoolExecutor, as_completed

        server_client_config_file = "deepmd_server_client_config.json"
        server_client_dir = "/opt"
        base_port = 50001
        if os.path.exists(server_client_config_file):
                with open(server_client_config_file, 'r') as f:
                        server_client_config = json.load(f)
                server_client_dir = server_client_config.get('server_client_dir', server_client_dir)
                base_port = int(server_client_config.get('base_port', base_port))
                num_servers = int(server_client_config.get('num_servers', num_servers))
                print(f"Loaded DeepMD server-client config from {server_client_config_file}")
        else:
                print(f"Warning: {server_client_config_file} not found; using default server-client directory {server_client_dir}")

        # Set up DeepMD calculator using multi-server mode for optimal performance.
        # Current LAMMPS dimer workflow does not expose a use_server=False option.
        try:
                # Always use multi-server mode for dimer calculations to avoid conflicts
                calc = get_deepmd_model(model_file, use_server=True, num_servers=num_servers,
                                        server_client_dir=server_client_dir, base_port=base_port)
                print(f"Using DeepMD multi-server mode with {num_servers} servers for dimer calculations")
        except ImportError:
                print("Error: DeepMD-kit not found. Please install deepmd-kit package.")
                return
        except Exception as e:
                print(f"Error loading model: {e}")
                return

        # Convert type_map string to list
        type_map_list = type_map.split(",")

        # Find all input files
        input_files = sorted(glob.glob(input_wildcard))

        if not input_files:
                print(f"No files matching pattern {input_wildcard} found")
                return

        print(f"Found {len(input_files)} structures for dimer calculations")

        # Load bond changes mapping from JSON file
        print(f"\nLoading bond changes mapping from {bond_changes_mapping_file}...")
        if not os.path.exists(bond_changes_mapping_file):
                print(f"Error: {bond_changes_mapping_file} not found. Please run snapshots_from_traj first.")
                return

        with open(bond_changes_mapping_file, 'r') as f:
                bond_changes_mapping = json.load(f)

        # Extract bond analysis results
        bond_analysis_results = {}
        for input_file in input_files:
                if input_file in bond_changes_mapping:
                        changed_atoms = bond_changes_mapping[input_file]["changed_atoms"]
                        if changed_atoms:
                                bond_analysis_results[input_file] = changed_atoms
                                print(f"  {input_file}: {len(changed_atoms)} atoms with bond changes")
                else:
                        print(f"  {input_file}: not found in mapping (skipping)")

        # Run dimer calculations
        dimer_results = []

        # Run dimer calculations
        if not bond_analysis_results:
                print("No structures with bond changes found for dimer calculations")
                return

        print(f"\nRunning {len(bond_analysis_results)} dimer calculations...")

        # Run dimer calculations in parallel or sequentially
        if num_processes > 1 and len(bond_analysis_results) > 1:
                # Prepare arguments for parallel execution
                calc_params = {
                        'type_map_list': type_map_list,
                        'model_file': model_file,
                        'use_server': True,  # Always use server for dimer
                        'num_servers': num_servers,
                        'server_client_dir': server_client_dir,
                        'base_port': base_port
                }

                dimer_params = {
                        'displacement_magnitude': displacement_magnitude,
                        'mask_mode': mask_mode,
                        'displacement_mode': displacement_mode,
                        'max_displaced_atoms': max_displaced_atoms,
                        'random_method': random_method,
                        'min_displacement_ratio': min_displacement_ratio,
                        'fmax': fmax,
                        'max_steps': max_steps,
                        'f_rot_min': f_rot_min,
                        'f_rot_max': f_rot_max,
                        'max_num_rot': max_num_rot,
                        'trial_angle': trial_angle,
                        'trial_trans_step': trial_trans_step,
                        'maximum_translation': maximum_translation,
                        'dimer_separation': dimer_separation,
                        'extrapolate_forces': extrapolate_forces,
                        'use_central_forces': use_central_forces,
                        'use_adaptive_strategy': use_adaptive_strategy,
                        'adaptive_force_threshold': adaptive_force_threshold,
                        'adaptive_consecutive_steps': adaptive_consecutive_steps,
                        'phase2_trial_angle': phase2_trial_angle,
                        'phase2_dimer_separation': phase2_dimer_separation,
                        'phase2_cg_translation': phase2_cg_translation,
                        'phase2_f_rot_max': phase2_f_rot_max,
                        'phase2_displacement_magnitude': phase2_displacement_magnitude
                }

                # Create argument list for parallel execution
                args_list = [(input_file, changed_atoms, calc_params, dimer_params)
                            for input_file, changed_atoms in bond_analysis_results.items()]

                with ProcessPoolExecutor(max_workers=num_processes) as executor:
                        futures = {}
                        for args in args_list:
                                future = executor.submit(run_single_dimer_parallel, args)
                                futures[future] = args[0]  # input_file

                        completed = 0
                        for future in as_completed(futures):
                                completed += 1
                                input_file = futures[future]
                                result = future.result()
                                if result:
                                        dimer_results.append(result)
                                        status = "converged" if result['converged'] else "not converged"
                                        print(f"[{completed}/{len(bond_analysis_results)}] {input_file}: {status} after {result['nsteps']} steps")
                                else:
                                        print(f"[{completed}/{len(bond_analysis_results)}] {input_file}: Failed")
        else:
                # Run sequentially - prepare parameters the same way
                calc_params = {
                        'type_map_list': type_map_list,
                        'model_file': model_file,
                        'use_server': True,  # Always use server for dimer
                        'num_servers': num_servers,
                        'server_client_dir': server_client_dir,
                        'base_port': base_port
                }

                dimer_params = {
                        'displacement_magnitude': displacement_magnitude,
                        'mask_mode': mask_mode,
                        'displacement_mode': displacement_mode,
                        'max_displaced_atoms': max_displaced_atoms,
                        'random_method': random_method,
                        'min_displacement_ratio': min_displacement_ratio,
                        'fmax': fmax,
                        'max_steps': max_steps,
                        'f_rot_min': f_rot_min,
                        'f_rot_max': f_rot_max,
                        'max_num_rot': max_num_rot,
                        'trial_angle': trial_angle,
                        'trial_trans_step': trial_trans_step,
                        'maximum_translation': maximum_translation,
                        'dimer_separation': dimer_separation,
                        'extrapolate_forces': extrapolate_forces,
                        'use_central_forces': use_central_forces,
                        'use_adaptive_strategy': use_adaptive_strategy,
                        'adaptive_force_threshold': adaptive_force_threshold,
                        'adaptive_consecutive_steps': adaptive_consecutive_steps,
                        'phase2_trial_angle': phase2_trial_angle,
                        'phase2_dimer_separation': phase2_dimer_separation,
                        'phase2_cg_translation': phase2_cg_translation,
                        'phase2_f_rot_max': phase2_f_rot_max,
                        'phase2_displacement_magnitude': phase2_displacement_magnitude
                }

                for i, (input_file, changed_atoms) in enumerate(bond_analysis_results.items()):
                        print(f"[{i+1}/{len(bond_analysis_results)}] Processing {input_file}...")
                        args = (input_file, changed_atoms, calc_params, dimer_params)
                        try:
                                result = run_single_dimer_parallel(args)
                                if result:
                                        dimer_results.append(result)
                                        status = "converged" if result['converged'] else "not converged"
                                        print(f"  {status} after {result['nsteps']} steps")
                                else:
                                        print(f"  Failed - no result returned")
                        except Exception as e:
                                print(f"  Failed - exception: {e}")
                                import traceback
                                traceback.print_exc()

        print(f"\nDimer calculations completed: {len(dimer_results)} successful")

        # Create wildcard pattern for convert_xyz_lmpdump_deepmdnpymixed
        # The dimer outputs are named like opt_startpoint_idx00000703_step00003515_time00003515_dp_ts.xyz
        # We want to match all of them with *dp_ts.xyz
        print("\nDimer transition state search completed.")
        print(f"Output files written with pattern: opt_startpoint_*_dp_ts.xyz")
        print("These files will be processed by convert_xyz_lmpdump_deepmdnpymixed")


def get_model_devi (models="./model.000.pth,./model.001.pth,./model.002.pth,./model.003.pth",datas="data_dp_ts",outs="./model_devi_dp_ts.out"):
        models=" ".join(models.split(","))
        datas=datas.split(",")
        outs=outs.split(",")
        for idx,data in enumerate (datas):
                if os.path.exists(data):
                        os.system("dp model-devi -m %s -s %s -o %s" %(models,data,outs[idx]))
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